# 1.Исходные данные:
Nn := 7
T := 0.0005 + 0.00001*Nn = 0.00057
ωp := 1100 + 4*Nn = 1128
ωk := π/T = 5511.57
ωz := 2000 + 4*Nn = 2028
e := 0.509
ωz0 := 440 + 4*Nn = 468
ωp0 := 800 + 4*Nn = 828
ωs := 2*π/T = 11023.1
δHp := 0.2
R := 800
δHz := 0.1
fs := 1/T = 1754.39
F(ω) :=
    1 if ωz0 < ω < ωz
    1 - (ω - ωp)/(ωz - ωp) if ωz > ω > ωp
    1 - (ω - ωz0)/(ωz0 - ωp0) if ωp0 < ω < ωp0
    0 otherwise
ω := 0, 100 .. ωk
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# 2. Рассчитываем граничные частоты АФ прототипа:
Ωp := 2/T*tan(ωp*T/2) = 1168.54
Ωz := 2/T*tan(ωz*T/2) = 2288.72
# 3. Аппроксимация АЧХ ЦФ:
# 3.1. Определяем неравномерности передачи в ПП и минимальное затухание в ПЗ:
Rmax := 20*log(1/(1 - δHp)) = 1.9382
Rmin := 20*log(1/δHz) = 20
# 3.2 Определяем порядок n АФ:
n := log((10^(0.1*Rmin) - 1)/(10^(0.1*Rmax) - 1))/(2*log(ωz/ωp)) = 4.40713
# Порядок фильтра может быть только целым числом.следовательно принимаем:
n := 4
# 3.3 Определяем частоты среза Ω_c  АФ:
1/(1 + (Ωz/ωc2)^(2*n)) ≥ (1 - δHz)^2
1/(1 + (Ωp/ωc1)^(2*n)) ≥ (1 - δHp)^2
Ωz = 2288.72
Ωp = 1168.54
1/(1 + (2.289*10^3/ωc2)^8) == 0.01 solve, ωc2 → [
    1288.81740771;
    -1288.81740771;
    -1288.81740771i;
    1288.81740771i;
    -911.331528704 - 911.331528704i;
    -911.331528704 + 911.331528704i;
    911.331528704 + 911.331528704i;
    911.331528704 - 911.331528704i
]
1/(1 + (1.169*10^3/ωc1)^8) == 0.64 solve, ωc1 → [
    1256.1722503;
    -1256.1722503;
    -1256.1722503i;
    1256.1722503i;
    -888.247916527 - 888.247916527i;
    -888.247916527 + 888.247916527i;
    888.247916527 + 888.247916527i;
    888.247916527 - 888.247916527i
]
ωc2 := 1288
ωc1 := 1256
ωc := (ωc1 + ωc2)/2 = 1272
wk := π/(T*ωs) = 0.5
w := 0, 0.001 .. wk
wc := ωc/ωs = 0.115394
w1 := wc - 0.05 = 0.0653937
w2 := wc + 0.05 = 0.165394
D := iirpass(cheby1(n, e), w1, w2)
D = [
    0.0776794, 1, 0.0236241, 1;
    0, -2.75415, 0, -2.79764;
    -0.155359, 3.57309, -0.0472482, 3.53939;
    0, -2.51529, 0, -2.24572;
    0.0776794, 0.848245, 0.0236241, 0.64935
]
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# Синтеза БИХ ЗФ Чебишева
F1 := iirstop(cheby1(n, e), w1, w2)
F1 = [
    0.743329, 1, 0.462656, 1;
    -2.33997, -2.74631, -1.45643, -2.02698;
    3.32819, 3.55599, 2.07151, 1.72181;
    -2.33997, -2.505, -1.45643, -0.885869;
    0.743329, 0.846691, 0.462656, 0.275015
]
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# Фильтруем
# Полосовой
N := 2^8
n := 0 .. N - 1
v[0] := 1
res := response(v, D, N)
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q := 0 .. N - 1
Q[q] := N/15
x[q] := sin(0.05*q)
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h[q] := res[q]
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y := convol(x, h)
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# Заграждающий
res := response(v, F1, N)
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q := 0 .. N - 1
Q[q] := N/5
x[q] := sin(0.1*q)
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h[q] := res[q]
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y := convol(x, h)
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