# 1.Исходные данные:
Nn := 3
T := 0.0005 + 0.00001*Nn = 0.00053
ωp := 1100 + 4*Nn = 1112
ωk := π/T = 5927.53
ωz := 2000 + 4*Nn = 2012
e := 0.509
ωz0 := 440 + 4*Nn = 452
ωp0 := 800 + 4*Nn = 812
ωs := 2*π/T = 11855.1
δHp := 0.2
R := 800
δHz := 0.1
fs := 1/T = 1886.79
F(ω) :=
    1 if ωz0 < ω < ωz
    1 - (ω - ωp)/(ωz - ωp) if ωz > ω > ωp
    1 - (ω - ωz0)/(ωz0 - ωp0) if ωp0 < ω < ωp0
    0 otherwise
ω := 0, 100 .. ωk
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# 2. Рассчитываем граничные частоты АФ прототипа:
Ωp := 2/T*tan(ωp*T/2) = 1145.35
Ωz := 2/T*tan(ωz*T/2) = 2227.16
# 3. Аппроксимация АЧХ ЦФ:
# 3.1. Определяем неравномерности передачи в ПП и минимальное затухание в ПЗ:
Rmax := 20*log(1/(1 - δHp)) = 1.9382
Rmin := 20*log(1/δHz) = 20
# 3.2 Определяем порядок n АФ:
n := log((10^(0.1*Rmin) - 1)/(10^(0.1*Rmax) - 1))/(2*log(ωz/ωp)) = 4.35983
# Порядок фильтра может быть только целым числом.следовательно принимаем:
n := 4
# 3.3 Определяем частоты среза Ω_c  АФ:
1/(1 + (Ωz/ωc2)^(2*n)) ≥ (1 - δHz)^2
1/(1 + (Ωp/ωc1)^(2*n)) ≥ (1 - δHp)^2
Ωz = 2227.16
Ωp = 1145.35
1/(1 + (2.227*10^3/ωc2)^8) == 0.01 solve, ωc2 → [
    1253.9084172;
    -1253.9084172;
    -1253.9084172i;
    1253.9084172i;
    -886.64714479 - 886.64714479i;
    -886.64714479 + 886.64714479i;
    886.64714479 + 886.64714479i;
    886.64714479 - 886.64714479i
]
1/(1 + (1.145*10^3/ωc1)^8) == 0.64 solve, ωc1 → [
    1230.38257194;
    -1230.38257194;
    -1230.38257194i;
    1230.38257194i;
    -870.011860071 - 870.011860071i;
    -870.011860071 + 870.011860071i;
    870.011860071 + 870.011860071i;
    870.011860071 - 870.011860071i
]
ωc2 := 1253
ωc1 := 1230
ωc := (ωc1 + ωc2)/2 = 1241.5
wk := π/(T*ωs) = 0.5
w := 0, 0.001 .. wk
wc := ωc/ωs = 0.104723
w1 := wc - 0.05 = 0.0547232
w2 := wc + 0.05 = 0.154723
D := iirpass(cheby1(n, e), w1, w2)
D = [
    0.0776794, 1, 0.0236241, 1;
    0, -2.91144, 0, -2.95742;
    -0.155359, 3.8167, -0.0472482, 3.77255;
    0, -2.65894, 0, -2.37398;
    0.0776794, 0.848245, 0.0236241, 0.64935
]
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# Синтеза БИХ ЗФ Чебишева
F1 := iirstop(cheby1(n, e), w1, w2)
F1 = [
    0.743329, 1, 0.462656, 1;
    -2.47361, -2.90315, -1.53961, -2.14275;
    3.54455, 3.79876, 2.20617, 1.85647;
    -2.47361, -2.64807, -1.53961, -0.936463;
    0.743329, 0.846691, 0.462656, 0.275015
]
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# Фильтруем
# Полосовой
N := 2^12 = 4096
n := 0 .. N - 1
v[0] := 1
res := response(v, D, N)
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q := 0 .. N - 1
Q[q] := N/1
x[q] := sin(0.2*q)
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h[q] := res[q]
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y := convol(x, h)
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# Заграждающий
res := response(v, F1, N)
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q := 0 .. N - 1
Q[q] := N/5
x[q] := sin(0.2*q)
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h[q] := res[q]
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y := convol(x, h)
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