# 1.Исходные данные:
Nn := 2
T := 0.0005 + 0.00001*Nn = 0.00052
ωp := 1100 + 4*Nn = 1108
ωk := π/T = 6041.52
ωz := 2000 + 4*Nn = 2008
e := 0.509
ωz0 := 440 + 4*Nn = 448
ωp0 := 800 + 4*Nn = 808
ωs := 2*π/T = 12083
δHp := 0.2
R := 800
δHz := 0.1
fs := 1/T = 1923.08
F(ω) :=
    1 if ωz0 < ω < ωz
    1 - (ω - ωp)/(ωz - ωp) if ωz > ω > ωp
    1 - (ω - ωz0)/(ωz0 - ωp0) if ωp0 < ω < ωp0
    0 otherwise
ω := 0, 100 .. ωk
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# 2. Рассчитываем граничные частоты АФ прототипа:
Ωp := 2/T*tan(ωp*T/2) = 1139.7
Ωz := 2/T*tan(ωz*T/2) = 2212.8
# 3. Аппроксимация АЧХ ЦФ:
# 3.1. Определяем неравномерности передачи в ПП и минимальное затухание в ПЗ:
Rmax := 20*log(1/(1 - δHp)) = 1.9382
Rmin := 20*log(1/δHz) = 20
# 3.2 Определяем порядок n АФ:
n := log((10^(0.1*Rmin) - 1)/(10^(0.1*Rmax) - 1))/(2*log(ωz/ωp)) = 4.34799
# Порядок фильтра может быть только целым числом.следовательно принимаем:
n := 4
# 3.3 Определяем частоты среза Ω_c  АФ:
1/(1 + (Ωz/ωc2)^(2*n)) ≥ (1 - δHz)^2
1/(1 + (Ωp/ωc1)^(2*n)) ≥ (1 - δHp)^2
Ωz = 2212.8
Ωp = 1139.7
1/(1 + (2.213*10^3/ωc2)^8) == 0.01 solve, ωc2 → [
    1246.02574192;
    -1246.02574192;
    -1246.02574192i;
    1246.02574192i;
    -881.073251648 - 881.073251648i;
    -881.073251648 + 881.073251648i;
    881.073251648 + 881.073251648i;
    881.073251648 - 881.073251648i
]
1/(1 + (1.14*10^3/ωc1)^8) == 0.64 solve, ωc1 → [
    1225.00972228;
    -1225.00972228;
    -1225.00972228i;
    1225.00972228i;
    -866.212681643 - 866.212681643i;
    -866.212681643 + 866.212681643i;
    866.212681643 + 866.212681643i;
    866.212681643 - 866.212681643i
]
ωc2 := 1246
ωc1 := 1225
ωc := (ωc1 + ωc2)/2 = 1235.5
wk := π/(T*ωs) = 0.5
w := 0, 0.001 .. wk
wc := ωc/ωs = 0.102251
w1 := wc - 0.05 = 0.0522507
w2 := wc + 0.05 = 0.152251
D := iirpass(cheby1(n, e), w1, w2)
D = [
    0.0776794, 1, 0.0236241, 1;
    0, -2.94605, 0, -2.99257;
    -0.155359, 3.87211, -0.0472482, 3.82558;
    0, -2.69055, 0, -2.4022;
    0.0776794, 0.848245, 0.0236241, 0.64935
]
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# Синтеза БИХ ЗФ Чебишева
F1 := iirstop(cheby1(n, e), w1, w2)
F1 = [
    0.743329, 1, 0.462656, 1;
    -2.50301, -2.93766, -1.55791, -2.16822;
    3.59376, 3.85398, 2.2368, 1.8871;
    -2.50301, -2.67954, -1.55791, -0.947594;
    0.743329, 0.846691, 0.462656, 0.275015
]
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# Фильтруем
# Полосовой
N := 2^12
n := 0 .. N - 1
v[0] := 1
res := response(v, D, N)
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q := 0 .. N - 1
Q[q] := N/5
x[q] := sin(0.2*q)
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h[q] := res[q]
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y := convol(x, h)
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# Заграждающий
res := response(v, F1, N)
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q := 0 .. N - 1
Q[q] := N/5
x[q] := sin(0.2*q)
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h[q] := res[q]
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y := convol(x, h)
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