# 1.Исходные данные:
Nn := 3
T := 0.0005 + 0.00001*Nn = 0.00053
ωp := 1100 + 4*Nn = 1112
ωk := π/T = 5927.53
ωz := 2000 + 4*Nn = 2012
e := 0.509
ωz0 := 440 + 4*Nn = 452
ωp0 := 800 + 4*Nn = 812
ωs := 2*π/T = 11855.1
δHp := 0.2
R := 800
δHz := 0.1
fs := 1/T = 1886.79
F(ω) :=
    1 if ωz0 < ω < ωz
    1 - (ω - ωp)/(ωz - ωp) if ωz > ω > ωp
    1 - (ω - ωz0)/(ωz0 - ωp0) if ωp0 < ω < ωp0
    0 otherwise
ω := 0, 100 .. ωk
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# 2. Рассчитываем граничные частоты АФ прототипа:
Ωp := 2/T*tan(ωp*T/2) = 1145.35
Ωz := 2/T*tan(ωz*T/2) = 2227.16
# 3. Аппроксимация АЧХ ЦФ:
# 3.1. Определяем неравномерности передачи в ПП и минимальное затухание в ПЗ:
Rmax := 20*log(1/(1 - δHp)) = 1.9382
Rmin := 20*log(1/δHz) = 20
# 3.2 Определяем порядок n АФ:
n := log((10^(0.1*Rmin) - 1)/(10^(0.1*Rmax) - 1))/(2*log(ωz/ωp)) = 4.35983
# Порядок фильтра может быть только целым числом.следовательно принимаем:
n := 4
# 3.3 Определяем частоты среза Ω_c  АФ:
1/(1 + (Ωz/ωc2)^(2*n)) ≥ (1 - δHz)^2
1/(1 + (Ωp/ωc1)^(2*n)) ≥ (1 - δHp)^2
Ωp = 1145.35
Ωz = 2227.16
1/(1 + (1.145*10^3/ωc1)^8) == 0.64
1/(1 + (2.227*10^3/ωc2)^8) == 0.01
[
    1230.38257194;
    -1230.38257194;
    -1230.38257194i;
    1230.38257194i;
    -870.011860071 - 870.011860071i;
    -870.011860071 + 870.011860071i;
    870.011860071 + 870.011860071i;
    870.011860071 - 870.011860071i
]
[
    1253.9084172;
    -1253.9084172;
    -1253.9084172i;
    1253.9084172i;
    -886.64714479 - 886.64714479i;
    -886.64714479 + 886.64714479i;
    886.64714479 + 886.64714479i;
    886.64714479 - 886.64714479i
]
ωc1 := 1230
ωc2 := 1253
ωc := (ωc1 + ωc2)/2 = 1241.5
wk := π/(T*ωs) = 0.5
w := 0, 0.001 .. wk
wc := ωc/ωs
n := 5
w1 := wc - 0.05 = 0.0547232
w2 := wc + 0.05 = 0.154723
D := iirpass(butter(n), w1, w2)
D = [
    0.080813, 1, 0.0647168, 1, 0.245237, 1;
    0, -2.80306, 0, -2.57616, 0, -1.25583;
    -0.161626, 3.48851, -0.129434, 2.79368, -0.245237, 0.509525;
    0, -2.29154, 0, -1.50371, 0, 0;
    0.080813, 0.692569, 0.0647168, 0.355447, 0, 0
]
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# Синтеза БИХ ЗФ Баттерворта
F1 := iirstop(butter(n), w1, w2)
F1 = [
    0.765472, 1, 0.613007, 1, 0.754763, 1;
    -2.5473, -2.80306, -2.03993, -2.57616, -1.25583, -1.25583;
    3.65014, 3.48851, 2.92311, 2.79368, 0.754763, 0.509525;
    -2.5473, -2.29154, -2.03993, -1.50371, 0, 0;
    0.765472, 0.692569, 0.613007, 0.355447, 0, 0
]
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# Фильтруем
# Полосовой
N := 2^6
n := 0 .. N - 1
v[0] := 1
res := response(v, D, N)
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q := 0 .. N - 1
Q[q] := N/5
x[q] := cos(0.3*q)
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h[q] := res[q]
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y := convol(x, h)
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# Заграждающий
res := response(v, F1, N)
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q := 0 .. N - 1
Q[q] := N/5
x[q] := cos(0.3*q)
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h[q] := res[q]
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y := convol(x, h)
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