# 1.Исходные данные:
Nn := 3
T := 0.0005 + 0.00001*Nn = 0.00053
ωp := 1100 + 4*Nn = 1112
ωk := π/T = 5927.53
ωz := 2000 + 4*Nn = 2012
e := 0.509
ωz0 := 440 + 4*Nn = 452
ωp0 := 800 + 4*Nn = 812
ωs := 2*π/T = 11855.1
δHp := 0.2
R := 800
δHz := 0.1
fs := 1/T = 1886.79
F(ω) :=
    1 if ωz0 < ω < ωz
    1 - (ω - ωp)/(ωz - ωp) if ωz > ω > ωp
    1 - (ω - ωz0)/(ωz0 - ωp0) if ωp0 < ω < ωp0
    0 otherwise
ω := 0, 100 .. ωk
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# 2. Рассчитываем граничные частоты АФ прототипа:
Ωp := 2/T*tan(ωp*T/2) = 1145.35
Ωz := 2/T*tan(ωz*T/2) = 2227.16
# 3. Аппроксимация АЧХ ЦФ:
# 3.1. Определяем неравномерности передачи в ПП и минимальное затухание в ПЗ:
Rmax := 20*log(1/(1 - δHp)) = 1.9382
Rmin := 20*log(1/δHz) = 20
# 3.2 Определяем порядок n АФ:
n := log((10^(0.1*Rmin) - 1)/(10^(0.1*Rmax) - 1))/(2*log(ωz/ωp)) = 4.35983
# Порядок фильтра может быть только целым числом.следовательно принимаем:
n := 4
# 3.3 Определяем частоты среза Ω_c  АФ:
1/(1 + (Ωz/ωc2)^(2*n)) ≥ (1 - δHz)^2
1/(1 + (Ωp/ωc1)^(2*n)) ≥ (1 - δHp)^2
Ωp = 1145.35
Ωz = 2227.16
1/(1 + (1.145*10^3/ωc1)^8) == 0.64
1/(1 + (2.227*10^3/ωc2)^8) == 0.01
[
    1230.38257194;
    -1230.38257194;
    -1230.38257194i;
    1230.38257194i;
    -870.011860071 - 870.011860071i;
    -870.011860071 + 870.011860071i;
    870.011860071 + 870.011860071i;
    870.011860071 - 870.011860071i
]
[
    1253.9084172;
    -1253.9084172;
    -1253.9084172i;
    1253.9084172i;
    -886.64714479 - 886.64714479i;
    -886.64714479 + 886.64714479i;
    886.64714479 + 886.64714479i;
    886.64714479 - 886.64714479i
]
ωc1 := 1230
ωc2 := 1253
ωc := (ωc1 + ωc2)/2 = 1241.5
wk := π/(T*ωs) = 0.5
w := 0, 0.001 .. wk
wc := 0.077
n := 5
w1 := wc - 0.05 = 0.027
w2 := wc + 0.05 = 0.127
D := iirpass(cheby1(n, e), w1, w2)
D = [
    0.0897544, 1, 0.037845, 1, 0.08596, 1;
    0, -3.2959, 0, -3.34569, 0, -1.70155;
    -0.179509, 4.52213, -0.0756899, 4.48843, -0.08596, 0.82808;
    0, -3.10975, 0, -2.87259, 0, 0;
    0.0897544, 0.900001, 0.037845, 0.745857, 0, 0
]
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# Синтеза БИХ ЗФ Баттерворта
F := iirstop(cheby1(n, e), w1, w2)
F = [
    0.857901, 1, 0.624836, 1, 0.471123, 1;
    -3.19409, -3.28802, -2.32636, -2.73868, -0.87703, -0.87703;
    4.68882, 4.50553, 3.41502, 3.10768, 0.471123, -0.0577548;
    -3.19409, -3.10017, -2.32636, -1.91403, 0, 0;
    0.857901, 0.899091, 0.624836, 0.557015, 0, 0
]
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