# 1.Исходные данные:
Nn := 3
T := 0.0005 + 0.00001*Nn = 0.00053
ωp := 1100 + 4*Nn = 1112
ωk := π/T = 5927.53
ωz := 2000 + 4*Nn = 2012
ωz0 := 440 + 4*Nn = 452
ωp0 := 800 + 4*Nn = 812
ωs := 2*π/T = 11855.1
δHp := 0.2
R := 800
δHz := 0.1
fs := 1/T = 1886.79
F(ω) :=
    1 if ωz0 < ω < ωz
    1 - (ω - ωp)/(ωz - ωp) if ωz > ω > ωp
    1 - (ω - ωz0)/(ωz0 - ωp0) if ωp0 < ω < ωp0
    0 otherwise
ω := 0, 100 .. ωk
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# 2. Рассчитываем граничные частоты АФ прототипа:
Ωp := 2/T*tan(ωp*T/2) = 1145.35
Ωz := 2/T*tan(ωz*T/2) = 2227.16
# 3. Аппроксимация АЧХ ЦФ:
# 3.1. Определяем неравномерности передачи в ПП и минимальное затухание в ПЗ:
Rmax := 20*log(1/(1 - δHp)) = 1.9382
Rmin := 20*log(1/δHz) = 20
# 3.2 Определяем порядок n АФ:
n := log((10^(0.1*Rmin) - 1)/(10^(0.1*Rmax) - 1))/(2*log(ωz/ωp)) = 4.35983
# Порядок фильтра может быть только целым числом.следовательно принимаем:
n := 4
# 3.3 Определяем частоты среза Ω_c  АФ:
1/(1 + (Ωp/ωc1)^(2*n)) ≥ (1 - δHp)^2
1/(1 + (Ωz/ωc2)^(2*n)) ≥ (1 - δHz)^2
1/(1 + (1.145*10^3/ωc1)^8) == 0.64
1/(1 + (2.227*10^3/ωc2)^8) == 0.01
[
    1230.38257194;
    -1230.38257194;
    -1230.38257194i;
    1230.38257194i;
    -870.011860071 - 870.011860071i;
    -870.011860071 + 870.011860071i;
    870.011860071 + 870.011860071i;
    870.011860071 - 870.011860071i
]
[
    1253.9084172;
    -1253.9084172;
    -1253.9084172i;
    1253.9084172i;
    -886.64714479 - 886.64714479i;
    -886.64714479 + 886.64714479i;
    886.64714479 + 886.64714479i;
    886.64714479 - 886.64714479i
]
ωc1 := 1230
ωc2 := 1253
# Следовательно, при значениях wс, лежащих в пределах от 1256 до 1289 рад/c, выполняются требования к АЧХ
ωс := (ωc1 + ωc2)/2 = 1241.5
fc := ωс/(2*π) = 197.591
ω := 0, 100 .. ωk
AC(ω) := ω*T/(2*π)
AC(Ωp) = 0.0966124
AF(ω) := 1/sqrt(1 + (ω/ωс)^(2*n))
AC(Ωz) = 0.187865
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# Значения АЧХ фильтра на границах интервалов пропускания и задерживания равны:
AF(ωp) = 0.840885
AF(ωz) = 0.143469
ω := 0, 100 .. ωk
F(ω) :=
    1 if 0 ≤ ω ≤ ωс
    0 if ωс ≤ ω ≤ ωk
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# 3.4 Зададим для БИХ-ФНЧ Баттерворта основной диапазон нормированных частот w:
wc := ωс/ωs = 0.104723
wk := π/(T*ωs) = 0.5
wp := ωp/ωs = 0.0937996
wz := ωz/ωs = 0.169716
w := 0, 0.001 .. wk
B(w) :=
    1 if 0 ≤ w ≤ wc
    0 if wc ≤ w ≤ wk
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# 4. Расчитаем массив  коэф. ПФ,РУ и ЧХ БИХ-ФНЧ:
N := 2^6 = 64
n := 4
w := wc
wc = 0.104723
A := iirlow(butter(n), w)
A = [
    0.0845933, 1, 0.0667037, 1;
    0.169187, -1.28234, 0.133407, -1.01116;
    0.0845933, 0.620715, 0.0667037, 0.27797
]
# Синтеза БИХ ПлФ Баттерворта
w1 := wc - 0.05 = 0.0547232
w2 := wc + 0.05 = 0.154723
H(z) := (0.1 + 0.169*z^-1 + 0.1*z^-2)/(1 + 1.128*z^-1 - 0.621*z^-2)*(0.067 + 0.133*z^-1 + 0.067*z^-2)/(1 + 1.011*z^-1 - 0.278*z^-2)
D := iirpass(butter(n), w1, w2)
H1(z) := (0.1 + 0.169*z^-1 + 0.1*z^-2)/(1 + 1.128*z^-1 - 0.621*z^-2)
H2(z) := (0.067 + 0.133*z^-1 + 0.067*z^-2)/(1 + 1.011*z^-1 - 0.278*z^-2)
# 4. Получаем ПФ H(s) по аппроксимируемой АЧХ АФ
D = [
    0.0779563, 1, 0.0618852, 1;
    0, -2.76279, 0, -2.53625;
    -0.155913, 3.3652, -0.12377, 2.67144;
    0, -2.15172, 0, -1.36511;
    0.0779563, 0.632739, 0.0618852, 0.29614
]
# ПФ нормированного ФНЧ Баттерворта при n = 4 имеет вид:
# В ПФ нормированного ФНЧ оператор s заменяется на оператор c  s/wc
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Hn(s) := 1/((s^2 + 0.765*s + 1)*(s^2 + 1.848*s + 1))
H_ФНЧ(s) := Hn(s/ωс)
# Применив  операцию денормирования, получим передаточную
# функцию фильтра:
H_ФНЧ(s) → 1/((0.00061619009263*s + 6.48793592644e-7*s^2 + 1)*(0.00148852194925*s + 6.48793592644e-7*s^2 + 1))
# Дальнейшие расчеты выполним по отдельным каскадам. Для первого и второго каскадов после денормирования получим передаточные функции АФ - прототипов:
H1(s) := 1/(0.00061619009263*s + 6.48793592644e-7*s^2 + 1)
H2(s) := 1/(0.00148852194925*s + 6.48793592644e-7*s^2 + 1)
# 4. Рассчитываем коэффициенты ПФ ЦФНЧ, применив билинейное преобразование и исследуем его устойчивость
H(z) := H(s)  # error: This value has units: Time, but must have units: Unitless.
s := 2/T*(1 - z^-1)/(1 + z^-1)  # error: This variable is undefined.
H1(s) simplify → (0.263568906843*z + 0.0294605562441)/(z^2 - 1.31148750417*z + 0.629856704128) + 0.0795922999894
H11(z) := z^-2*((0.263568906843*z + 0.0294605562441) + (z^2 - 1.31148750417*z + 0.629856704128)*0.0795922999894)
H11(z) simplify → (0.0795922999894*z^2 + 0.159184599979*z + 0.0795922999894)/z^2
H12(z) := z^-2*(z^2 - 1.31148750417*z + 0.629856704128)
H12(z) simplify → (z^2 - 1.31148750417*z + 0.629856704128)/z^2
H2(s) simplify → (0.191677594635*z + 0.0446848629178)/(z^2 - 1.03921076022*z + 0.291483616239) + 0.063068214006
H21(z) := z^-2*((0.191677594635*z + 0.0446848629178) + (z^2 - 1.03921076022*z + 0.291483616239)*0.063068214006)
H21(z) simplify → (0.063068214006*z^2 + 0.126136428012*z + 0.063068214006)/z^2
H22(z) := z^-2*(z^2 - 1.03921076022*z + 0.291483616239)
H22(z) simplify → (z^2 - 1.03921076022*z + 0.291483616239)/z^2
# Исследуем устойчивость ЦФ:
H1(z) := H11(z)/H12(z)
H1(z) → (0.159184599979*z + 0.0795922999894*z^2 + 0.0795922999894)/(-1.31148750417*z + z^2 + 0.629856704128)
-1.31148750417*z + z^2 + 0.629856704128 == 0
[0.655743752085 - 0.447053504325i; 0.655743752085 + 0.447053504325i]
e11 := 0.66 - 0.45i
e12 := 0.66 + 0.45i
H2(z) := H21(z)/H22(z)
w1 := wc - 0.05 = 0.0547232
w2 := wc + 0.05 = 0.154723
H2(z) → (0.126136428012*z + 0.063068214006*z^2 + 0.063068214006)/(-1.03921076022*z + z^2 + 0.291483616239)
D := iirpass(butter(n), w1, w2)
-1.03921076022*z + z^2 + 0.291483616239 == 0
[0.519605380108 - 0.146607862008i; 0.519605380108 + 0.146607862008i]
e21 := 0.52 - 0.15i
e22 := 0.52 + 0.15i
D = [
    0.0779563, 1, 0.0618852, 1;
    0, -2.76279, 0, -2.53625;
    -0.155913, 3.3652, -0.12377, 2.67144;
    0, -2.15172, 0, -1.36511;
    0.0779563, 0.632739, 0.0618852, 0.29614
]
# ЦФ устойчив, все полюса ПФ находятся внутри единичного круга z-плоскости
# 7. Расччитаем ИХ БИХ-ФНЧ
i := 0 .. 1
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K[i] := R*A[:, 2*i + 1]
R(v) := (-v[1] - sqrt(v[1]^2 - 4*v[2]))/2
K[i + 2] := conj(K[i])
A1 := [0.085, 1; 0.169, -1.282; 0.085, 0.621]
A2 := [0.067, 1; 0.133, -1.011; 0.067, 0.278]
k := 0 .. 3
A = [
    0.0845933, 1, 0.0667037, 1;
    0.169187, -1.28234, 0.133407, -1.01116;
    0.0845933, 0.620715, 0.0667037, 0.27797
]
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max(vectorize(|K|)) = 1392.48
w := 0, 0.001 .. wk
δp := |gain(A, wp)| = 0.848124
1 - δHp = 0.8
δz := |gain(A, wz)| = 0.111272
δHz = 0.1
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K := [0.66 - 0.45i; 0.52 - 0.15i; 0.66 + 0.45i; 0.52 + 0.15i]
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N := 2^6
n := 0 .. N - 1
v[0] := 1
res := response(v, A, N)
A = [
    0.0845933, 1, 0.0667037, 1;
    0.169187, -1.28234, 0.133407, -1.01116;
    0.0845933, 0.620715, 0.0667037, 0.27797
]
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# ИХ БИХ-ФНЧ
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res1 := response(v, A1, N)
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res2 := response(v, A2, N)
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# АЧХ БИХ-ФНЧ
M := 2^12 = 4096
m := 0 .. M - 1
w[m] := m/(2*(M - 1))
r[m] := gain(A, w[m])
r1[m] := gain(A1, w[m])
r2[m] := gain(A2, w[m])
M := mag(r)
M1 := mag(r1)
M2 := mag(r2)
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# ФЧХ БИХ-ФНЧ
P := phasecor(phase(r))
P1 := phasecor(phase(r1))
P2 := phasecor(phase(r2))
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# Фильтрующие свойства
q := 0 .. N - 1
Q[q] := N/5
x[q] :=
    1 if 0 ≤ q ≤ Q[q]
    0 if Q[q] < q ≤ N - 1
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h[q] := res[q]
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y := convol(x, h)
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# Групповое время
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τ := 3*T = 0.00159
