# 1. Найти отклик ЦФ с ИХ hk на сигнал xk
k := 0, 1 .. 10
h[k] := 1, 1, 0, 0, 0, 0, 0, 0, 0, 0
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x[k] := 1, 1, 0, 0, 0, 0, 0, 0, 0, 0
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m := 0 .. 10
y[m] := sum(x[k]*h[m - k], k = 0 .. m)
y[m] = [1; 2; 1; 0; 0; 0; 0; 0; 0; 0; 0]
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