# 3. Методом Z-преобразования найти отклик ЦФ с ИХ  hk на сигнал xk
k := 0, 1 .. 10
h[k] := 1, 1, 0, 0, 0, 0, 0, 0, 0, 0
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x[k] := 1, 1, 0, 0, 0, 0, 0, 0, 0, 0
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# Z-преобразование входного сигнала:
N := 64
n := 0 .. N - 1
H(z) := (1 + z)/z
h(n) := H(z) invztrans → δ(n, 0) + δ(n - 1, 0)
h(1) = 1
h(0) = 1
X(z) := (1 + z)/z
x(n) := X(z) invztrans → δ(n, 0) + δ(n - 1, 0)
x(1) = 1
x(0) = 1
Y(z) := X(z)*H(z)
y[k] := 1/(2*1i*π)*integral(Y(z)*z^(k - 1), z)  # error: This variable is undefined.
