ДАНО
# Фильтр Чебышева
ПЭ2-18
k := 4  # номер варианта
ωp := 10000 + 200*k
ωp = 10800
Циклическая частота полосы пропускания
ωz := 20000 + 200*k
ωz = 20800
Циклическая частота полосы задержания
δHp := 0.2
допуски на максимальное значение неравномерности АЧХ в ПП
δHz := 0.1
максимальное отклонение АЧХ от нуля в ПЗ
R := 900
Сопротивление звеньев фильтра
ε := 0.5
T := 5*10^-5
wp := 2/T*tan(ωp*T/2) = 11070.3
# Граничные частот АФ прототипа
wz := 2/T*tan(ωz*T/2) = 22902.5
Rmax := 20*log(1/(1 - δHp)) = 1.9382  # неравномерности передачи в ПП и минимальное затухание в ПЗ
Rmin := 20*log(1/δHz) = 20
n := log((10^(0.1*Rmin) - 1)/(10^(0.1*Rmax) - 1))/(2*log(wz/wp)) = 3.55615
n := 4
1/(1 + (wp/wc2)^8) == 0.01 solve, wc2 → [
    6233.12718639;
    -6233.12718639;
    -6233.12718639i;
    6233.12718639i;
    -4407.4865015 - 4407.4865015i;
    -4407.4865015 + 4407.4865015i;
    4407.4865015 + 4407.4865015i;
    4407.4865015 - 4407.4865015i
]
1/(1 + (wp/wc1)^8) == 0.64 solve, wc1 → [
    11895.838848;
    -11895.838848;
    -11895.838848i;
    11895.838848i;
    -8411.62831729 - 8411.62831729i;
    -8411.62831729 + 8411.62831729i;
    8411.62831729 + 8411.62831729i;
    8411.62831729 - 8411.62831729i
]
wc1 := 11895
wc2 := 6233
wc := (wc1 + wc2)/2 = 9064  # АЧХ аналогового ФНЧ Чебышева прототипа
Η(w) := 1/sqrt(1 + ε^2*(8*(w/wc)^4 - 8*(w/wc)^2 + 1)^2*(w/wc))
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εp := 1 - 0.92159 = 0.07841
Η(ωp) = 0.302778
Η(ωz) = 0.00730519
# Получаем ПФ  H(s) по аппроксимируемой АЧХ АФ
Ηn(s) := 0.245/((s^2 + 0.674*s + 0.279)*(s^2 + 0.279*s + 0.987))
Η(s) := Ηn(s/wc)
Η(s) → 0.245/((7.43601059135e-5*s + s^2/82156096 + 0.279)*(3.07811120918e-5*s + s^2/82156096 + 0.987))
K(p) := 1/((p^2 + 0.765*p + 1)*(p^2 + 1.848*p + 1))
p := s/wc
K(p) explicit, ALL → 1/((0.000203883495146*s + s^2/82156096 + 1)*(8.43998234775e-5*s + s^2/82156096 + 1))
K(s) := 1/((0.00156876061121*s + s^2/1387684 + 1)*(0.000649405772496*s + s^2/1387684 + 1))
k(s) := 1/((0.00156876061121*s + s^2/1387684 + 1)*(0.000649405772496*s + s^2/1387684 + 1)) simplify → 1.92566688386e12/((s^2 + 901.17*s + 1387684)*(s^2 + 2176.944*s + 1387684))
Η1(s) := 1/(0.00156876061121*s + s^2/1387684 + 1)
Η2(s) := 1/(0.000649405772496*s + s^2/1387684 + 1)
s := 2/T*(1 - z^-1)/(1 + z^-1)  # disabled  # Рассчитываем коэффициенты ПФ ЦФНЧ, применив билинейное преобразование  и исследуем его устойчивость
Η(z) := Η(s)  # disabled
Η1(s) simplify → 1/(7.20625156736e-7*s^2 + 0.00156876061121*s + 1.0)
Η11(z) := z^-2*(0.165908271622*z + 0.0354893390842 + (z^2 - 1.11991250585*z + 0.332621383183)*0.0531772193324)
Η11(z) simplify → (0.0531772193324*z^2 + 0.106354438665*z + 0.0531772193324)/z^2
Η12(z) := z^-2*(z^2 - 1.11991250585*z + 0.332621383183)
Η12(z) simplify → (z^2 - 1.11991250585*z + 0.332621383183)/z^2
Η2(s) simplify → 1/(7.20625156736e-7*s^2 + 0.000649405772496*s + 1.0)
Η21(z) := z^-2*(0.224235808531*z + 0.0227020249668 + (z^2 - 1.39215535706*z + 0.656572265992)*0.0661042272323)
Η21(z) simplify → (0.0661042272323*z^2 + 0.132208454465*z + 0.0661042272323)/z^2
Η22(z) := z^-2*(z^2 - 1.39215535706*z + 0.656572265992)
Η22(z) simplify → (z^2 - 1.39215535706*z + 0.656572265992)/z^2
Η1(z) := Η11(z)/Η12(z)
Η1(z) → (0.106354438665*z + 0.0531772193324*z^2 + 0.0531772193324)/(-1.11991250585*z + z^2 + 0.332621383183)
Η2(z) := Η21(z)/Η22(z)
Η2(z) → (0.132208454465*z + 0.0661042272323*z^2 + 0.0661042272323)/(-1.39215535706*z + z^2 + 0.656572265992)
-1.11991250585*z + z^2 + 0.332621383183 == 0
[0.559956252927 - 0.138095539361i; 0.559956252927 + 0.138095539361i]
-1.39215535706*z + z^2 + 0.656572265992 == 0
[0.696077678531 - 0.414786850614i; 0.696077678531 + 0.414786850614i]
h(n) := Η(z) invztrans, z → 0.88970233102*δ(n, 0) + (-0.583337774524 + 0.321089975708i)*(-3054.568 + 3686.61974136i)^n + (0.138486609014 + 0.0474447347861i)*(-1264.428 + 8915.67656349i)^n + (0.138486609014 - 0.0474447347861i)*(-1264.428 - 8915.67656349i)^n + (-0.583337774524 - 0.321089975708i)*(-3054.568 - 3686.61974136i)^n
N := 2^6
n := 0 .. N - 1
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h[n] := h(n)
K := cfft(h)
K := K/K[0]
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h1(n) := Η1(z) invztrans, z → 0.159873123079*δ(n, 0) + (-0.0533479518734 - 0.817018823095i)*(0.559956252927 + 0.138095539361i)^n + (-0.0533479518734 + 0.817018823095i)*(0.559956252927 - 0.138095539361i)^n
N := 2^6
n := 0 .. N - 1
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wz*T/(2*π) = 0.182252
h(w) := wp*T/(2*π)
(wp*T/(2*π)) = 0.0880949
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h1[n] := h1(n)
wz*T/(2*π) = 0.182252
K[5] = 0.881765 - 0.471569i
K1 := cfft(h1)
K[10] = 0.555122 - 0.831514i
(wp*T/(2*π)) = 0.0880949
K1 := K1/K1[0]
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h2(n) := Η2(z) invztrans, z → 0.100680809496*δ(n, 0) + (-0.0172882911316 - 0.299314931604i)*(0.696077678531 + 0.414786850614i)^n + (-0.0172882911316 + 0.299314931604i)*(0.696077678531 - 0.414786850614i)^n
N := 2^6
n := 0 .. N - 1
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h2[n] := h2(n)
K2 := cfft(h2)
K2 := K2/K2[0]
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