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# номер варианта
ДАНО
# Фильтр Чебышева
ПЭ2-18
k := 2
ωp := 20000 + 200*k
ωp = 20400
Циклическая частота полосы пропускания
ωz := 10000 + 200*k
ωz = 10400
Циклическая частота полосы задержания
δHp := 0.2
допуски на максимальное значение неравномерности АЧХ в ПП
δHz := 0.1
максимальное отклонение АЧХ от нуля в ПЗ
R := 900
Сопротивление звеньев фильтра
ε := 0.5
T := 5*10^-5
wp := 2/T*tan(ωp*T/2) = 22374.3
# Граничные частот АФ прототипа
wz := 2/T*tan(ωz*T/2) = 10640.9
Rmax := 20*log(1/(1 - δHp)) = 1.9382  # неравномерности передачи в ПП и минимальное затухание в ПЗ
Rmin := 20*log(1/δHz) = 20
n := log((10^(0.1*Rmin) - 1)/(10^(0.1*Rmax) - 1))/(2*log(wz/wp)) = -3.47846
n := 4
1/(1 + (wp/wc2)^8) == 0.01 solve, wc2 → [
    12597.8374815;
    -12597.8374815;
    -12597.8374815i;
    12597.8374815i;
    -8908.01631145 - 8908.01631145i;
    -8908.01631145 + 8908.01631145i;
    8908.01631145 + 8908.01631145i;
    8908.01631145 - 8908.01631145i
]
1/(1 + (wp/wc1)^8) == 0.64 solve, wc1 → [
    24042.8022774;
    -24042.8022774;
    -24042.8022774i;
    24042.8022774i;
    -17000.8285291 - 17000.8285291i;
    -17000.8285291 + 17000.8285291i;
    17000.8285291 + 17000.8285291i;
    17000.8285291 - 17000.8285291i
]
wc1 := 24042
wc2 := 12597
wc := (wc1 + wc2)/2 = 18319.5  # АЧХ аналогового ФВЧ Чебышева прототипа
Η(w) := 1/sqrt(1 + ε^2*(8*(wc/w)^4 - 8*(wc/w)^2 + 1)^2*(wc/w))
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# В результатете синтеза АЧХ фильтра достигнуты заданые характеристики
εp := 1 - 0.92172 = 0.07828
Η(ωp) = 0.993123
Η(ωz) = 0.028315
# Получаем ПФ  H(s) по аппроксимируемой АЧХ АФ
Ηn(s) := 0.245/((s^2 + 0.674*s + 0.279)*(s^2 + 0.279*s + 0.987))
Η(s) := Ηn(wc/s)
Η(s) → 0.245/((12347.343/s + 335604080.25/s^2 + 0.279)*(5111.1405/s + 335604080.25/s^2 + 0.987))
K(p) := 0.245/((p^2 + 0.674*p + 0.279)*(p^2 + 0.279*p + 0.987))
p := wc/s
K(p) explicit, ALL → 0.245/((12347.343/s + 335604080.25/s^2 + 0.279)*(5111.1405/s + 335604080.25/s^2 + 0.987))
K(s) := 0.245/((12347.343/s + 335604080.25/s^2 + 0.279)*(5111.1405/s + 335604080.25/s^2 + 0.987))
k(s) := 0.245/((12347.343/s + 335604080.25/s^2 + 0.279)*(5111.1405/s + 335604080.25/s^2 + 0.987)) simplify → 490000.0*s^4/(550746.0*s^4 + 27225671481*s^3 + 9.75967540942e14*s^2 + 1.17182765952e19*s + 2.25260197361e23)
Η1(s) := 0.245/(12347.343/s + 335604080.25/s^2 + 0.279)
Η2(s) := 0.245/(5111.1405/s + 335604080.25/s^2 + 0.987)
s := 2/T*(1 - z^-1)/(1 + z^-1)  # error: This variable is undefined.
# Рассчитываем коэффициенты ПФ ЦФВЧ, применив билинейное преобразование  и исследуем его устойчивость
Η(z) := Η(s)  # error: This variable is undefined.
Η1(s) simplify → 0.307234638952 - 1.0*(5.61110232384e20*z - 2.37858014514e20)/(1e21*z^2 - 1.7367522654e20*z + 2.25809904362e20)
Η11(z) := z^-2*(0.165908271622*z + 0.0354893390842 + (z^2 - 1.11991250585*z + 0.332621383183)*0.0531772193324)
Η11(z) simplify → (0.0531772193324*z^2 + 0.106354438665*z + 0.0531772193324)/z^2
Η12(z) := z^-2*(z^2 - 1.11991250585*z + 0.332621383183)
Η12(z) simplify → (z^2 - 1.11991250585*z + 0.332621383183)/z^2
Η2(s) simplify → 0.184971124428 - 1.0*(3.82141529547e20*z - 8.92215207378e19)/(2.5e21*z^2 - 2.9340476481e21*z + 2.01764622174e21)
Η21(z) := z^-2*(0.224235808531*z + 0.0227020249668 + (z^2 - 1.39215535706*z + 0.656572265992)*0.0661042272323)
Η21(z) simplify → (0.0661042272323*z^2 + 0.132208454465*z + 0.0661042272323)/z^2
Η22(z) := z^-2*(z^2 - 1.39215535706*z + 0.656572265992)
Η22(z) simplify → (z^2 - 1.39215535706*z + 0.656572265992)/z^2
Η1(z) := Η11(z)/Η12(z)
Η1(z) → (0.106354438665*z + 0.0531772193324*z^2 + 0.0531772193324)/(-1.11991250585*z + z^2 + 0.332621383183)
Η2(z) := Η21(z)/Η22(z)
Η2(z) → (0.132208454465*z + 0.0661042272323*z^2 + 0.0661042272323)/(-1.39215535706*z + z^2 + 0.656572265992)
-1.11991250585*z + z^2 + 0.332621383183 == 0  # Полюса ситемы находяться в приделах еденичной окружности-система являеться устойчивой
[0.559956252927 - 0.138095539361i; 0.559956252927 + 0.138095539361i]
-1.39215535706*z + z^2 + 0.656572265992 == 0
[0.696077678531 - 0.414786850614i; 0.696077678531 + 0.414786850614i]
h(n) := Η(z) invztrans, z → 1.27279961119*δ(n, 0) + (-0.494004010008 + 0.691920425185i)*(0.0868376132699 + 0.46719282238i)^n + (-0.0264171494022 - 0.108791123738i)*(0.58680952962 + 0.68023015564i)^n + (-0.0264171494022 + 0.108791123738i)*(0.58680952962 - 0.68023015564i)^n + (-0.494004010008 - 0.691920425185i)*(0.0868376132699 - 0.46719282238i)^n
N := 64
n := 0 .. N - 1
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# Реакция на импульс первого звена
# удовлетворительна
h[n] := h(n)
K := cfft(h)
K := K/K[0]
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# Частотная характеристика первого звена
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h1(n) := Η1(z) invztrans, z → 0.159873123079*δ(n, 0) + (-0.0533479518734 - 0.817018823095i)*(0.559956252927 + 0.138095539361i)^n + (-0.0533479518734 + 0.817018823095i)*(0.559956252927 - 0.138095539361i)^n
N := 2^6
n := 0 .. N - 1
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wz*T/(2*π) = 0.0846773
h(w) := wp*T/(2*π)
(wp*T/(2*π)) = 0.178049
# Реакция на импульс второго звена
# удовлетворительна
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h1[n] := h1(n)
wz*T/(2*π) = 0.0846773
K[5] = 123.334 + 81.7159i
K1 := cfft(h1)
K[10] = -4532.31 - 663.172i
(wp*T/(2*π)) = 0.178049
K1 := K1/K1[0]
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# Форма входного и выходного сигнала
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h2(n) := Η2(z) invztrans, z → 0.100680809496*δ(n, 0) + (-0.0172882911316 - 0.299314931604i)*(0.696077678531 + 0.414786850614i)^n + (-0.0172882911316 + 0.299314931604i)*(0.696077678531 - 0.414786850614i)^n
N := 2^6
n := 0 .. N - 1
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# Реакция на импульс фильтра ВЧ
h2[n] := h2(n)
K2 := cfft(h2)
# Получаем ЧХ путём операций преобразования
K2 := K2/K2[0]
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# Фаза частотная характеристика фильтра
# Вывод
# Характеристика полученого фильтра практически полностью укладываються в требования ТЗ
# В полосе пропускания наблюдаютьсяколебания АЧХ свойственные данному типу фильтров
