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# номер варианта
ДАНО
# Фильтр Чебышева
ПЭ2-18
k := 2
ωp := 10000 + 200*k
ωp = 10400
Циклическая частота полосы пропускания
ωz := 20000 + 200*k
ωz = 20400
Циклическая частота полосы задержания
δHp := 0.2
допуски на максимальное значение неравномерности АЧХ в ПП
δHz := 0.1
максимальное отклонение АЧХ от нуля в ПЗ
R := 900
Сопротивление звеньев фильтра
ε := 0.5
T := 5*10^-5
wp := 2/T*tan(ωp*T/2) = 10640.9
# Граничные частот АФ прототипа
wz := 2/T*tan(ωz*T/2) = 22374.3
Rmax := 20*log(1/(1 - δHp)) = 1.9382  # неравномерности передачи в ПП и минимальное затухание в ПЗ
Rmin := 20*log(1/δHz) = 20
n := log((10^(0.1*Rmin) - 1)/(10^(0.1*Rmax) - 1))/(2*log(wz/wp)) = 3.47846
n := 4
1/(1 + (wp/wc2)^8) == 0.01 solve, wc2 → [
    5991.31837139;
    -5991.31837139;
    -5991.31837139i;
    5991.31837139i;
    -4236.50184866 - 4236.50184866i;
    -4236.50184866 + 4236.50184866i;
    4236.50184866 + 4236.50184866i;
    4236.50184866 - 4236.50184866i
]
1/(1 + (wp/wc1)^8) == 0.64 solve, wc1 → [
    11434.3499983;
    -11434.3499983;
    -11434.3499983i;
    11434.3499983i;
    -8085.30642223 - 8085.30642223i;
    -8085.30642223 + 8085.30642223i;
    8085.30642223 + 8085.30642223i;
    8085.30642223 - 8085.30642223i
]
wc1 := 11434
wc2 := 5991
wc := (wc1 + wc2)/2 = 8712.5  # АЧХ аналогового ФНЧ Чебышева прототипа
Η(w) := 1/sqrt(1 + ε^2*(8*(w/wc)^4 - 8*(w/wc)^2 + 1)^2*(w/wc))
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# В результатете синтеза АЧХ фильтра достигнуть заданыххарактеристик не вышло
εp := 1 - 0.92172 = 0.07828
Η(ωp) = 0.298946
Η(ωz) = 0.00661444
# Получаем ПФ  H(s) по аппроксимируемой АЧХ АФ
Ηn(s) := 0.245/((s^2 + 0.674*s + 0.279)*(s^2 + 0.279*s + 0.987))
Η(s) := Ηn(s/wc)
Η(s) → 0.245/((7.73601147776e-5*s + 1.31739016774e-8*s^2 + 0.279)*(3.20229555237e-5*s + 1.31739016774e-8*s^2 + 0.987))
K(p) := 1/((p^2 + 0.765*p + 1)*(p^2 + 1.848*p + 1))
p := s/wc
K(p) explicit, ALL → 1/((0.000212109038737*s + 1.31739016774e-8*s^2 + 1)*(8.78048780488e-5*s + 1.31739016774e-8*s^2 + 1))
K(s) := 1/((0.00156876061121*s + s^2/1387684 + 1)*(0.000649405772496*s + s^2/1387684 + 1))
k(s) := 1/((0.00156876061121*s + s^2/1387684 + 1)*(0.000649405772496*s + s^2/1387684 + 1)) simplify → 1.92566688386e12/((s^2 + 901.17*s + 1387684)*(s^2 + 2176.944*s + 1387684))
Η1(s) := 1/(0.00156876061121*s + s^2/1387684 + 1)
Η2(s) := 1/(0.000649405772496*s + s^2/1387684 + 1)
s := 2/T*(1 - z^-1)/(1 + z^-1)  # error: This variable is undefined.
# Рассчитываем коэффициенты ПФ ЦФНЧ, применив билинейное преобразование  и исследуем его устойчивость
Η(z) := Η(s)  # error: This variable is undefined.
Η1(s) simplify → (0.0031999721671*z + 8.47702514873e-5)/(z^2 - 1.89356829502*z + 0.896855739264) + 0.000821861060249
Η11(z) := z^-2*(0.165908271622*z + 0.0354893390842 + (z^2 - 1.11991250585*z + 0.332621383183)*0.0531772193324)
Η11(z) simplify → (0.0531772193324*z^2 + 0.106354438665*z + 0.0531772193324)/z^2
Η12(z) := z^-2*(z^2 - 1.11991250585*z + 0.332621383183)
Η12(z) simplify → (z^2 - 1.11991250585*z + 0.332621383183)/z^2
Η2(s) simplify → (0.00334971228307*z + 3.73129364895e-5)/(z^2 - 1.95258171441*z + 0.95597161248) + 0.000847474517948
Η21(z) := z^-2*(0.224235808531*z + 0.0227020249668 + (z^2 - 1.39215535706*z + 0.656572265992)*0.0661042272323)
Η21(z) simplify → (0.0661042272323*z^2 + 0.132208454465*z + 0.0661042272323)/z^2
Η22(z) := z^-2*(z^2 - 1.39215535706*z + 0.656572265992)
Η22(z) simplify → (z^2 - 1.39215535706*z + 0.656572265992)/z^2
Η1(z) := Η11(z)/Η12(z)
Η1(z) → (0.106354438665*z + 0.0531772193324*z^2 + 0.0531772193324)/(-1.11991250585*z + z^2 + 0.332621383183)
Η2(z) := Η21(z)/Η22(z)
Η2(z) → (0.132208454465*z + 0.0661042272323*z^2 + 0.0661042272323)/(-1.39215535706*z + z^2 + 0.656572265992)
-1.11991250585*z + z^2 + 0.332621383183 == 0  # Полюса ситемы находяться в приделах еденичной окружности-система являеться устойчивой
[0.559956252927 - 0.138095539361i; 0.559956252927 + 0.138095539361i]
-1.39215535706*z + z^2 + 0.656572265992 == 0
[0.696077678531 - 0.414786850614i; 0.696077678531 + 0.414786850614i]
h(n) := Η(z) invztrans, z → 0.00064544895484*δ(n, 0) + (-0.0268310688414 + 0.0543619988397i)*(0.860580151305 + 0.386870958694i)^n + (0.0267229358523 - 0.150472479595i)*(0.850627462844 + 0.152738148265i)^n + (0.0267229358523 + 0.150472479595i)*(0.850627462844 - 0.152738148265i)^n + (-0.0268310688414 - 0.0543619988397i)*(0.860580151305 - 0.386870958694i)^n
N := 64
n := 0 .. N - 1
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# Реакция на импульс первого звена
# удовлетворительна
h[n] := h(n)
K := cfft(h)
K := K/K[0]
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# Частотная характеристика первого звена
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h1(n) := Η1(z) invztrans, z → 0.159873123079*δ(n, 0) + (-0.0533479518734 - 0.817018823095i)*(0.559956252927 + 0.138095539361i)^n + (-0.0533479518734 + 0.817018823095i)*(0.559956252927 - 0.138095539361i)^n
N := 2^6
n := 0 .. N - 1
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wz*T/(2*π) = 0.178049
h(w) := wp*T/(2*π)
(wp*T/(2*π)) = 0.0846773
# Реакция на импульс второго звена
# удовлетворительна
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h1[n] := h1(n)
wz*T/(2*π) = 0.178049
K[5] = 0.0954806 - 0.44873i
K1 := cfft(h1)
K[10] = 0.0111056 - 0.00114331i
(wp*T/(2*π)) = 0.0846773
K1 := K1/K1[0]
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# Форма Входного и выходного сигнала
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h2(n) := Η2(z) invztrans, z → 0.100680809496*δ(n, 0) + (-0.0172882911316 - 0.299314931604i)*(0.696077678531 + 0.414786850614i)^n + (-0.0172882911316 + 0.299314931604i)*(0.696077678531 - 0.414786850614i)^n
N := 2^6
n := 0 .. N - 1
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# Реакция на импульс фильтра НЧ
h2[n] := h2(n)
K2 := cfft(h2)
# Получаем ЧХ путём операций преобразования
K2 := K2/K2[0]
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# Фаза частотная характеристика фильтра
# Вывод
# В силу того что первые звенья фильтра имеют высокую крутизну спада АЧХ
# Фильтр не укладываеться взаданые требования и требует доработки в сторону уменьшения куртизны АЧХ первых звеньев за счет увеличения порядка фильтра,либо использованяи фильтров второго рода.
