ДАНО
# Фильтр Баттерворта
ПЭ1-17
k := 2  # номер варианта
ωp := 10000 + 200*k
ωp = 10400
Циклическая частота полосы пропускания
ωz := 20000 + 200*k
ωz = 20400
Циклическая частота полосы задержания
δHp := 0.2
допуски на максимальное значение неравномерности АЧХ в ПП
δHz := 0.1
максимальное отклонение АЧХ от нуля в ПЗ
R := 900
Сопротивление звеньев фильтра
ε := 0.5
T := 5*10^-5
wp := 2/T*tan(ωp*T/2) = 10640.9
# Граничные частот АФ прототипа
wz := 2/T*tan(ωz*T/2) = 22374.3
Rmax := 20*log(1/(1 - δHp)) = 1.9382  # неравномерности передачи в ПП и минимальное затухание в ПЗ
Rmin := 20*log(1/δHz) = 20
n := log((10^(0.1*Rmin) - 1)/(10^(0.1*Rmax) - 1))/(2*log(wz/wp)) = 3.47846
n := 4
1/(1 + (ωz/wc2)^8) == 0.01 solve, wc2 → [
    11486.1839744;
    -11486.1839744;
    -11486.1839744i;
    11486.1839744i;
    -8121.95857822 - 8121.95857822i;
    -8121.95857822 + 8121.95857822i;
    8121.95857822 + 8121.95857822i;
    8121.95857822 - 8121.95857822i
]
1/(1 + (ωp/wc1)^8) == 0.64 solve, wc1 → [
    11175.527291;
    -11175.527291;
    -11175.527291i;
    11175.527291i;
    -7902.29113078 - 7902.29113078i;
    -7902.29113078 + 7902.29113078i;
    7902.29113078 + 7902.29113078i;
    7902.29113078 - 7902.29113078i
]
wc1 := 11175
wc2 := 11486
wc := (wc1 + wc2)/2 = 11330.5
Η(w) := 1/sqrt(1 + ε^2*(8*(w/wc)^4 - 8*(w/wc)^2 + 1)^2*(w/wc))
# АЧХ аналогового ФВЧ Чебышева прототипа
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Η(1066) = 0.989985
Η(2149) = 0.987847
# Получаем ПФ  H(s) по аппроксимируемой АЧХ АФ
Ηn(s) := 1/((s^2 + 0.765*s + 1)*(s^2 + 1.848*s + 1))
Η(s) := Ηn(1178/s)
Η(s) → 1/((1387684/s^2 + 2176.944/s + 1)*(1387684/s^2 + 901.17/s + 1))
p := wc/s
K(p) := 1/((p^2 + 0.765*p + 1)*(p^2 + 1.848*p + 1))
K(p) explicit, ALL → 1/((8667.8325/s + 128380230.25/s^2 + 1)*(20938.764/s + 128380230.25/s^2 + 1))
K(s) := 1/((1387684/s^2 + 2176.944/s + 1)*(1387684/s^2 + 901.17/s + 1))
k(s) := K(s) simplify → (1.0*s^4 + 7.75481824268e-26*s^3 + 1.08420217249e-19*s)/((s^2 + 901.17*s + 1387684)*(s^2 + 2176.944*s + 1387684))
Η1(s) := 1/(1387684/s^2 + 2176.944/s + 1)
Η2(s) := 1/(1387684/s^2 + 901.17/s + 1)
s := 2/T*(1 - z^-1)/(1 + z^-1)  # error: This variable is undefined.
Η(z) := Η(s)  # error: This variable is undefined.
Η1(s) simplify → 0.947606008572 - 1.0*(1.00855323139e21*z - 9.77401212233e20)/(1e22*z^2 - 1.89356829502e22*z + 8.96855739264e21)
Η11(z) := z^-2*(1.0*(5.39611101178e20*z - 4.0919216864e20)*(1e21*z^2 - 1.11991250585e21*z + 3.32621383183e20) - 0.613133472259)
Η11(z) simplify → (5.39611101178e41*z^3 - 1.01350938915e42*z^2 + 6.37745617813e41*z - 1.36106065121e41)/z^2
Η12(z) := z^-2*(1e21*z^2 - 1.12771601267e21*z + 3.36769879207e20)
Η12(z) simplify → (1e21*z^2 - 1.12771601267e21*z + 3.36769879207e20)/z^2
Η2(s) simplify → 0.977138331722 - 1.0*(4.63342244762e20*z - 4.30218251296e20)/(1e22*z^2 - 1.95258171441e22*z + 9.5597161248e21)
Η21(z) := z^-2*(0.764740675242*(1e21*z^2 - 1.39974070511e21*z + 6.59221995854e20) - 1.0*(4.59042698491e20*z - 2.60606800999e20))
Η21(z) simplify → (7.64740675242e20*z^2 - 1.52948135048e21*z + 7.64740675242e20)/z^2
Η22(z) := z^-2*(1e21*z^2 - 1.39974070511e21*z + 6.59221995854e20)
Η22(z) simplify → (1e21*z^2 - 1.39974070511e21*z + 6.59221995854e20)/z^2
Η1(z) := Η11(z)/Η12(z)
1.12771601267e21*z + 1e21*z^2 + 3.36769879207e20
[-0.563858006335 - 0.137237122891i; -0.563858006335 + 0.137237122891i]
Η1(z) → ((5.39611101178e20*z - 4.0919216864e20)*(-1.11991250585e21*z + 1e21*z^2 + 3.32621383183e20) - 0.613133472259)/(-1.12771601267e21*z + 1e21*z^2 + 3.36769879207e20)
-1.39974070511e21*z + 1e21*z^2 + 6.59221995854e20
Η2(z) := Η21(z)/Η22(z)
[0.699870352557 - 0.411586546749i; 0.699870352557 + 0.411586546749i]
Η2(z) → (-1.52948135048e21*z + 7.64740675242e20*z^2 + 7.64740675242e20)/(-1.39974070511e21*z + 1e21*z^2 + 6.59221995854e20)
z := e^(1i*ω*T)  # disabled
Η(e^(1i*ω*T)) := Η(z)  # disabled
Η1(e^(1i*ω*T)) → ((5.39611101178e20*e^(0.00005i*ω) - 4.0919216864e20)*(-1.11991250585e21*e^(0.00005i*ω) + 1e21*e^(0.0001i*ω) + 3.32621383183e20) - 0.613133472259)/(-1.12771601267e21*e^(0.00005i*ω) + 1e21*e^(0.0001i*ω) + 3.36769879207e20)
Η2(e^(1i*ω*T)) → (-1.52948135048e21*e^(0.00005i*ω) + 7.64740675242e20*e^(0.0001i*ω) + 7.64740675242e20)/(-1.39974070511e21*e^(0.00005i*ω) + 1e21*e^(0.0001i*ω) + 6.59221995854e20)
