β := 500
Ek := 12
fs := 21.75*10^9
S0 := 0.207
S1 := 0.07
fg := 3.5*10^6
ρ := 200
Q := 150
ξ := 0.209
Ik1 := 9.1*10^-3 = 0.0091
Ik0 := 5.38*10^-3
R3opt := 37.5/S0 = 181.159
Lk := ρ/(2*π*fg) = 9.09457e-6
L1 := Lk
Ck := 1/(4*π^2*fg^2*Lk) = 2.27364e-10
pvkl := fs/(150*3.5*10^6) = 41.4286
k := 1/(S1*pvkl^2*Q*ρ*cos(atan(fg/fs))) = 2.77447e-7
C1 := Ck/pvkl = 5.4881e-12
C2 := Ck/(k*pvkl) = 1.97807e-5
C11 := C1 - 13.31*10^-12 = -7.8219e-12
C3 := 1/(1/Ck - (1/C11 + 1/C2)) = 7.56176e-12
X2 := 1/(2*π*fg*C2) = 0.00229885
Rd := (150*X2 + 4*R3opt)/2 = 362.491
Ib := Ik0/β = 1.076e-5
R1 := Ek*Rd/(Ik0*R3opt + Ib*Rd) = 4445.3
R2 := Rd*R1/(Rd + R1) = 335.161
C4 := 1/(2*R3opt*2*π*fg)*(20 + 20*Q) = 3.79025e-7
