fp := 200*10^6
fc := 5*10^6
Re := 1.99896
Ik0 := 9.65*10^-15
β := 200
a0 := 0.319
L3 := 6*10^-6
QL := 120
S := 1.3696
Esm := 0.6
Uce := 15
Uko := Uce/3 = 5
ωp := 2*π*fp = 1.25664e9
ρ := ωp*L3 = 7539.82
CΣ := 1/(ωp*ρ) = 1.05543e-13
Rp := ρ*QL = 904779
γ0 := a0*1 = 0.319
p := sqrt(Re/Rp) = 0.00148638
C2 := CΣ/p = 7.10065e-11
C1 := C2
C3 := 1/(1/CΣ - 1/C2 - 1/C1) = 1.05858e-13
Ub := Esm + 3*Ik0/S*(1 + 0.5/γ0) = 0.6
Rist := 3*β/(4*S)*(1 + 0.5/γ0) = 281.184
R5 := 3*Rist/β = 4.21776
Ep := Uko = 5
R3 := Rist*Ep/Ub = 2343.2
R4 := R3*Ub/(Ep - Ub) = 319.527
C4 := 15/(ωp*R5) = 2.83008e-9
L1 := 15*Rp/ωp = 0.0108
R1 := 2
R2 := 20
R3 = 2343.2
R4 = 319.527
R5 = 4.21776
L1 = 0.0108
L2 := 3*10^-6
L3 = 6e-6
C1 = 7.10065e-11
C2 = 7.10065e-11
C3 = 1.05858e-13
C4 = 2.83008e-9
