Дано
C := 80*10^-12  # Фарад
L := 40*10^-6  # Генри
R := 30  # Ом
V := 8  # В
Решение
# 1. Запишем формулы:
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# 2. Волновое сопротвление контура:
ρ := sqrt(L/C) explicit, ALL → sqrt(40*10^-6/(80*10^-12)) = 707.107  # Ом
# 3. Определим добротность контура:
Q := ρ/R explicit, ALL → 707.106781187/30 = 23.5702
# 4. Резонансная честота контура:
ω := 1/sqrt(L*C) explicit, ALL → 1/sqrt(40*10^-6*80*10^-12) = 17677670  # c^-1
f[0] := ω/(2*π) explicit, ALL → 17677669.5297/(2*π) = 2813488  # Гц
# 5. Полоса пропускания контура:
Ппр := f[0]/Q explicit, ALL → [2813488.48799][0]/23.5702260396 = 119366  # Гц
# 6.Токи в контуре и общей ветви в момент резонанса :
# 6.1 Емкостное сопротивление контура при резонансной частоте
Xc := 1/(ω*C) explicit, ALL → 1/(17677669.5297*80*10^-12) = 707.107  # Ом
# 6.2 Индуктивное сопротивление контура при резонансной частоте
Xl := ω*L explicit, ALL → 17677669.5297*40*10^-6 = 707.107  # Ом
# 6.3 Напряжение на конденсаторе, напряжение на индуктивности, напряжение на активном сопротивлении в момент резонанса
Uc := V*Q explicit, ALL → 8*23.5702260396 = 188.562  # В
(напряжение*на*кондесаторе)
Ul := Uc = 188.562  # В  # в момент резонанса напряжение на кондесаторе и индуктивности-одинаковое,а на резисторе-равно напряжению источника питания)
Ur := V = 8  # В
# 6.4 Резонансное сопротивление контура
Z := L/(C*R) explicit, ALL → 40*10^-6/(80*10^-12*30) = 16666.7  # Ом
# 6.5 Ток в общей ветви цепи
I[0] := V/Z explicit, ALL → 8/16666.6666667 = 0.00048  # А
# 7. График зависимости входного сопротивления контура от частоты
ωk := π/(1/f[0])*10 = 88388348
ω := 0, 1000 .. ωk
F(ω) := (R + 1i*ω*L)*(1/(ω*C*1i))/(R + 1i*ω*L + (1/(ω*C*1i)))
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