Дано
C := 20*10^-6  # Фарад
L := 0.2  # Генри
Rн := 100  # Ом
Решение
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# 1. Запишем формулы:
# 2. Частота среза:
fc := 1/(π*sqrt(L*C)) explicit, ALL → 1/(π*sqrt(0.2*20*10^-6)) = 159.155  # Гц
3.*Характеристическое*сопротивление
Rx := sqrt(L/C) explicit, ALL → sqrt(0.2/(20*10^-6)) = 100  # Ом
# 7. График зависимости входного сопротивления контура от частоты
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ωk := 20^4
Zn := Rx
Z1(ω) := 1/(1i*ω*2*C)
Z2(ω) := 1i*ω*L
Zvh(ω) := Z1(ω) + 1/(1/Z2(ω) + 1/(Z1(ω) + Zn))
ω := 0, 10 .. ωk
Z11(ω) := 1/(1/Z2(ω) + 1/(Z1(ω) + Zn))
Ku(ω) := 1/Zvh(ω)*Z11(ω)*1/(Z1(ω) + Zn)*Zn
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Z1(ω) := 1i*ω*L/2
Z2(ω) := 1/(1i*ω*C)
ωc := 2/sqrt(L*C)
ωc = 1000
Zvh(ω) := Z1(ω) + 1/(1/Z2(ω) + 1/(Z1(ω) + Zn))
Z11(ω) := 1/(1/Z2(ω) + 1/(Z1(ω) + Zn))
Ku(ω) := 1/Zvh(ω)*Z11(ω)*1/(Z1(ω) + Zn)*Zn
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