Дано
C := 20*10^-6  # Фарад
L := 0.2  # Генри
Rн := 100  # Ом
Решение
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# 1. Запишем формулы:
# 2. Частота среза:
fc := 1/(π*sqrt(L*C)) explicit, ALL → 1/(π*sqrt(0.2*20*10^-6)) = 159.155  # Гц
3.*Характеристическое*сопротивление
Rx := sqrt(L/C) explicit, ALL → sqrt(0.2/(20*10^-6)) = 100  # Ом
# 7. График зависимости входного сопротивления контура от частоты
ωk := 20^4
ω := 0, 10 .. ωk
F(ω) := 1/(1 - (ω/fc)^2)
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