M == x*v
R1 := 1
L := 1
R2 := 1
C := □  # error: This placeholder is empty.
R3 := 1
E := 1
R4 := 1
M := [1, -1, -1; R1, R2, 0; 0, R2, R3 + L*p]  # error: This variable is undefined.
M2 := [1, 0.5, -1; R1, E/p, 0; 0, p*L, R3 + L*p]  # error: This variable is undefined.
m1(p) := |M| → 2*p + 1
m2(p) := |M2| → 0.5*(p - 3.0*p^2 + 2.0)/p
i(p) := m2(p)/m1(p) → (0.5*p + (-1.5*p^2) + 1.0)/(p*(2*p + 1))
u(p) := i(p)*L*p → (0.5*p + (-1.5*p^2) + 1.0)/(2*p + 1)
p1 := 0
p2 := -0.5
F1(p) := 0.5*p + (-1.5*p^2) + 1.0
uF1(p) := 0.5*p + (-1.5*p^2) + 1.0
U(t) := uF1(p1)/F21(p1)*e^(p1*t) + uF1(p2)/F21(p2)*e^(p2*t)  # disabled
F2(p) := p*(2*p + 1)
uF2(p) := p*(2*p + 1)
F21(p) := d/dp(F2(p)) → 4*p + 1
F21(p) := d/dp(F2(p)) → 4*p + 1
I(t) := F1(p1)/F21(p1)*e^(p1*t) + F1(p2)/F21(p2)*e^(p2*t) → -0.375*e^(-0.5*t) + 1.0
U(t) := uF1(p2)/F21(p2)*e^(p2*t) → -0.375*e^(-0.5*t)
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