fp := 515*10^6
fc := 8*10^3
Re := 1.99985
Ik0 := 10.1652*10^-15
β := 317
a0 := 0.319
L3 := 3*10^-6
QL := 115
S := 1.23211
Esm := 0.6
Uce := 15
Uko := Uce/3 = 5
ωp := 2*π*fp = 3.23584e9
ρ := ωp*L3 = 9707.52
CΣ := 1/(ωp*ρ) = 3.1835e-14
Rp := ρ*QL = 1116365
γ0 := a0*1 = 0.319
p := sqrt(Re/Rp) = 0.00133843
C2 := CΣ/p = 2.37853e-11
C1 := C2
C3 := 1/(1/CΣ - 1/C2 - 1/C1) = 3.19204e-14
Ub := Esm + 3*Ik0/S*(1 + 0.5/γ0) = 0.6
Rist := 3*β/(4*S)*(1 + 0.5/γ0) = 495.409
R5 := 3*Rist/β = 4.68842
Ep := Uko = 5
R3 := Rist*Ep/Ub = 4128.41
R4 := R3*Ub/(Ep - Ub) = 562.965
C4 := 15/(ωp*R5) = 9.8873e-10
L1 := 15*Rp/ωp = 0.005175
R1 := 2
R2 := 20
R3 = 4128.41
R4 = 562.965
R5 = 4.68842
L1 = 0.005175
L2 := 3*10^-6
L3 = 3e-6
C1 = 2.37853e-11
C2 = 2.37853e-11
C3 = 3.19204e-14
C4 = 9.8873e-10
