fg := 2080000
α0 := 0.269
fT := 120*10^6
τ := 500*10^-9
Cb := 5*10^-12
Ikmax := 0.03
φT := 0.026
α1 := 0.455
Ikm := 0.02
ρ := 125
Qn := 175
Ek := 0.4*30 = 12
β := 63
ξgr := 0.875
θ := 75
ξ := ξgr*0.25 = 0.21875
Θ := θ*180/π = 4297.18
Rb := 3*10^-3*τ/Cb = 300
S0 := β/(Rb + β*φT/(α0*Ikm)) = 0.104225
Reopt := 37/S0 = 355.001
Ik1 := Ikm*α1 = 0.0091
Ik0 := Ikm*α0 = 0.00538
S1 := S0*α1*(1 - cos(Θ)) = 0.00615773
Lk := ρ/(2*π*fg) = 9.5646e-6
Ck := 1/(4*π*π*fg*fg*Lk) = 6.12134e-10
fs := fT/(S0*Rb) = 3837847
φs := atan(fg/fs) = 0.496658
pin := 1/(Qn*tan(φs)) = 0.0105435
C1 := Ck/pin = 5.80578e-8
k := 1/(S1*pin^2*Qn*ρ*cos(φs)) = 75.9593
C2 := Ck/(k*pin) = 7.64328e-10
C3 := 1/(1/Ck - 1/C1 + 1/C2) = 3.4191e-10
Uk := Ik1*pin^2*ρ*Qn = 0.022129
Uin := Ik1/S1 = 1.47782
Ec := 0.15 + Uin*cos(Θ) = 1.43593
X2 := 1/(2*π*fg*C2) = 100.11
Rd := (X2*150 + 4*Reopt)/2 = 8218.25
Ib := Ik0/β = 8.53968e-5
R1 := |Ek|*Rd/(Ik0*Reopt + Ib*Rd) = 37760.2
R2 := Rd*R1/(Rd + R1) = 6749.31
Ce1 := 20/(2*π*fg*Reopt) = 4.31079e-9
Ce2 := 20*Qn/(2*π*fg*Reopt) = 7.54389e-7
Ce := (Ce1 + Ce2)/2 = 3.7935e-7
Ce = 3.7935e-7
R1 = 37760.2
C1 = 5.80578e-8
R2 = 6749.31
C2 = 7.64328e-10
Lk = 9.5646e-6
C3 = 3.4191e-10
Reopt = 355.001
