N := 8
λ := 0.01*N
a := 0.8
k := 2*π/λ = 78.5398
ε1 := 0.0348
ε2 := 0.0174
f1 := sin(1/2*k*a*sin(ε1))/(1/2*k*a*sin(ε1)) = 0.812435
f2 := sin(1/2*k*a*sin(ε2))/(1/2*k*a*sin(ε2)) = 0.950942
ε1 := 0 .. 20
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θ := 0.3925
φ := 0.0174
D := 30*10^3/(2*θ*2*φ) = 1098177
A := D*λ^2/(4*π) = 559.297
L := 0.6
r0 := 2*L^2/λ = 9
R := 0.1*N = 0.8
f := 2.4*(0.1*N)*10^9 = 1920000000
c := 3*10^8
λ := c/f = 0.15625
L1 := sqrt(λ*R/2) = 0.25
Q := 0.6
S := π*R^2 = 2.01062
G := 4*π/λ^2*S*Q = 620.942
