a := 0.6
λ := 0.05
k := 2*π/λ
F(ε) := sin(1/2*k*a*sin(ε*π/180))/(1/2*k*a*sin(ε*π/180))
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yyyyy
2*2.12 = 4.24
F(2.12) = 0.705955
|F(7)| = 0.216144
D := 1450
G := 4*π/λ^2*S*q  # error: This variable is undefined.
A := G*λ^2/(4*π)  # error: This variable is undefined.
r0 := 2*L^2/λ
