R := 0.5
f := 10*10^9
L := 1
P1 := 10
P2 := -14
λ := c/f = 0.0299792 m/s
G := 4*π*R/λ*sqrt(10^((P2 - P1)/10)) = 13.2239 s/m
sqrt(10^((P2 - P1)/10)) = 0.0630957
G := 1056
S := G*λ^2/(4*π*0.6) = 0.125876 m^2/s^2
R := S/π = 0.0400677 m^2/s^2
sqrt(R) = 0.200169 m/s
