C1 := 100*10^-12
f := 10^3
ln(1 + 2*0.5) = 0.693147
1/(C1*R1*ln(1 + 2*0.25)) == f
2.46630346238/(C1*f)
1.44269504089/(C1*f)
1.44269504089/(C1*f)
R3 := 1
R4 := 4
# Это R1
R2 := 2.46630346238/(C1*f) = 24663035
R1 := R2/4 = 6165759
R3 := 10^3
R4 := R3*4 = 4000
