с := 3*10^8
ε := 3.8
f := 10*10^9
δ := 10^-4
ω := 2*π*f*δ
ε0 := 8.854*10^-12
u0 := 1.26*10^-6
νф := c/sqrt(ε) = 153790286 m/s
λ := νф/f = 0.015379 m/s
α := 0.5*ω*sqrt(ε0*ε*u0) = 0.0204549
zc := 120*π/sqrt(ε)*(1 + δ^2)^(1/4)*e^(1i*δ/2) = 193.392 + 0.00966962i
