f := 10*10^9
E1 := 2.2
E2 := 1
uo := 4*π*10^-7
w := 2*π*f
E0 := 10^-9/(36*π)
ua1 := uo
ua2 := uo
Ea1 := E0*E1
Ea2 := E0*E2
K100 := w*sqrt(Ea1*ua1)
K200 := w*sqrt(Ea2*ua2)
K100 = 310.649
K200 = 209.44
Pv(φ) := (K100*Ea2*cos(φ) - Ea1*sqrt(K200^2 - (K100*sin(φ))^2))/(K100*Ea2*cos(φ) + Ea1*sqrt(K200^2 - (K100*sin(φ))^2))
Pg(φ) := (K100*ua2*cos(φ) - ua1*sqrt(K200^2 - (K100*sin(φ))^2))/(K100*ua2*cos(φ) + ua1*sqrt(K200^2 - (K100*sin(φ))^2))
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