s1 := 0
f := 10*10^9
E1 := 1.33^2
E2 := 1
uo := 4*π*10^-7
w := 2*π*f
E0 := 10^-9/(36*π)
ua1 := uo
ua2 := uo
s2 := 0
Ea1 := E0*E1 - 1i*s1/w
Ea2 := E0*E2 - 1i*s2/w
K100 := w*sqrt(Ea1*ua1)
K200 := w*sqrt(Ea2*ua2)
K100 = 278.555
K200 = 209.44
Pv(φ) := (K100*Ea2*cos(φ) - Ea1*sqrt(K200^2 - (K100*sin(φ))^2))/(K100*Ea2*cos(φ) + Ea1*sqrt(K200^2 - (K100*sin(φ))^2))
Pg(φ) := (K100*ua2*cos(φ) - ua1*sqrt(K200^2 - (K100*sin(φ))^2))/(K100*ua2*cos(φ) + ua1*sqrt(K200^2 - (K100*sin(φ))^2))
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d2 := -atan((-0.5*sin(0.09))/(1 - 0.5*cos(0.09))) + atan((-0.5*sin(0.09))/(1 + 0.5*cos(0.09)))
d2 = 0.0592873
d := d2*2
d = 0.118575
ε := (1 + 0.5^2 + 2*0.5*cos(0.09))/(1 + 0.5^2 - 2*0.5*cos(0.09)*sqrt(1 + d^2))
ε = 9.09034
sigma := d*10^9*2*π*ε*E0
sigma = 0.0598824
