a := 2.3*10^-2
b := 1*10^-2
λ10 := 2/sqrt((1/a)^2 + (0/b)^2)
λ30 := 2/sqrt((3/a)^2 + (0/b)^2)
λ13 := 2/sqrt((1/a)^2 + (3/b)^2)
λ10 = 0.046
λ30 = 0.0153333
λ20 := 2/sqrt((2/a)^2 + (0/b)^2)
λ13 = 0.00659774
λ21 := 2/sqrt((2/a)^2 + (1/b)^2)
λ23 := 2/sqrt((2/a)^2 + (3/b)^2)
λ20 = 0.023
λ01 := 2/sqrt((0/a)^2 + (1/b)^2)
λ21 = 0.0150921
λ23 = 0.00640311
λ02 := 2/sqrt((0/a)^2 + (2/b)^2)
λ01 = 0.02
λ22 := 2/sqrt((2/a)^2 + (2/b)^2)
λ11 := 2/sqrt((1/a)^2 + (1/b)^2)
λ02 = 0.01
λ22 = 0.0091707
λ12 := 2/sqrt((1/a)^2 + (2/b)^2)
λ11 = 0.0183414
λ33 := 2/sqrt((3/a)^2 + (3/b)^2)
λ12 = 0.00977176
λ33 = 0.0061138
