a := 2.3*10^-2
b := 1*10^-2
SS := a*b
Or := sqrt(SS/π)
Or = 0.00855636
λe01 := 2*π*Or/2.405
λe02 := 2*π*Or/5.520
λe11 := 2*π*Or/3.832
λe12 := 2*π*Or/7.016
λe21 := 2*π*Or/5.136
λe01 = 0.0223539
λe02 = 0.00973935
λe11 = 0.0140295
λe12 = 0.00766265
λe21 = 0.0104675
λh01 := 2*π*Or/3.832
λh11 := 2*π*Or/1.841
λh12 := 2*π*Or/5.331
λh21 := 2*π*Or/3.054
λh02 := 2*π*Or/7.016
λh12 = 0.0100846
λh21 = 0.0176035
λh01 = 0.0140295
λh11 = 0.0292022
λh02 = 0.00766265
