r := 1000
Z0 := 120*π
ld := 0.1
ea := 10^-9/(36*π)
θ := π/2
f := 300*10^6
w := 2*π*f
I := 1
u0 := 4*π*10^-7
λ0 := 3*10^8/f
k := Z0/(w*u0)
Eθ := ((I*ld*w*u0)/(4*π))*(1/r)*sin(θ)
Eθ = 0.0188496
Hφ := ((I*ld*w*sqrt(ea*u0))/(4*π))*(1/r)*sin(θ)
Hφ = 5e-5
P := 80*π^2*(ld/λ0)^2
P = 7.89568
ρ := P/(4*π*r^2)
Psr := 1/(2*Re(|Eθ*Hφ|))
Psr = 530516
P2 := integral(integral(Psr*4*π*r^2, φ = 0 .. π), θ = 0 .. 2*π)
P2 = 1.31595e14
