f := 10*10^9
w := 2*π*f
B := 10
ua := 4*π*10^-7
X := 400
Ea := 10^-9/(36*π)
w = 6.28319e10
β := w*sqrt(Ea*ua)
α := w*Ea*X
Zvh := 1i*X
γ := β - 1i*α
modγ := sqrt(β^2 + α^2)
α = 222.222
β = 209.44
Ex := (-1i*α*B)/(w*Ea)*e^(-α*z)*e^(-1i*γ*X)  # error: bad_variable mc_z mc_z value_zone
modγ = 305.365
Emx(z) := (α*B)/(w*Ea)*e^(-α*z)
Emx(0) = 4000
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VF := w/modγ
VF = 205760014
VF/(3*10^8) = 0.685867
lamda := VF/f
lamda = 0.020576
