f := 10^9
u0 := 4*π*10^-7
a := 0.1
u := 1
sigma := 6*10^7
E := 2.4
ua := u0*u
u := 1
ua = 1.25664e-6
f1 := 10^4
E0 := 10^-9/(36*π)
f2 := 10^6
u0 := 4*π*10^-7
f3 := 10^9
ua := u0*u
w(f) := 2*π*f
ua = 1.25664e-6
k := 2*f*π*sqrt((1 - 1i*a)*E*E0*ua)
k23(x) := sqrt((2*π*x*sigma*u0)/2)*(1 - 1i)
k = 32.4867 - 1.62029i
B := Re(k)
Zc1 := (2*π*f1*ua)/(sqrt((2*π*f1*sigma*u0)/2)*(1 - 1i))
k1 := sqrt((2*π*f1*sigma*u0)/2)*(1 - 1i)
B = 32.4867
alpha := Im(k)
k2 := sqrt((2*π*f2*sigma*u0)/2)*(1 - 1i)
alpha = -1.62029
Zc1 = 2.5651e-5 + 2.5651e-5i
vf := (2*π*f)/B
k3 := sqrt((2*π*f3*sigma*u0)/2)*(1 - 1i)
Zc2 := 2*π*f2*ua/(sqrt(2*π*f2*sigma*u0/2)*(1 - 1i))
vf = 193408159
alpha1 := Im(k1)
lyamda := vf/f
alpha1 = -1539.06
Zc2 = 0.00025651 + 0.00025651i
lyamda = 0.193408
d1 := 1/alpha1
d1 = -0.000649747
Zc3 := 2*π*f3*ua/(sqrt(2*π*f3*sigma*u0/2)*(1 - 1i))
alpha2 := Im(k2)
alpha2 = -15390.6
Zc3 = 0.00811156 + 0.00811156i
d2 := 1/alpha2
d2 = -6.49747e-5
Zc(x) := ua*(2*π*x)/(sqrt(2*π*x*sigma*u0/2)*(1 - 1i))
alpha3 := Im(k3)
alpha3 = -486693
d3 := 1/alpha3
d3 = -2.05468e-6
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alpha23(x) := Im(k23(x))
d23(x) := 1/alpha23(x)
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z1 := 6.908/alpha1
z1 = -0.00448845
z2 := 6.908/alpha2
z2 = -0.000448845
z3 := 6.908/alpha3
z3 = -1.41937e-5
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