# Различные константы и данные из условия:
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# Вариант 6
f := 3*10^9*Hz
ε0 := 10^7/(4*π*(3*10^8)^2)  # Для волны типа Н10
# для воздуха
m := 1
n := 0
ε := 1
μ := 1
μ0 := 4*π*10^-7
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# Возьмём волновод WR-340, с частотным диапозоном 2.14-3.20 ГГц
# Его параметры: | По ОСТ 4.206.000 ред. 1-77
fmin := 2.14*10^9
fmax := 3.20*10^9
a := 90*10^-3
b := 45*10^-3
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λ := 3*10^8/f  # Это сделано из-за того, что маткад на размерность всё же матерится
λ = 0.1 s
λ := 0.075
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λкр := 2/sqrt((m/a)^2 + (n/b)^2)  # лк 10
λкр = 0.18
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λв := λ/sqrt(ε*μ - (λ/λкр)^2)
λв = 0.0825029
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# лк 13
Zн10 := sqrt(μ0/ε0)*1/sqrt(1 - (λ/λкр)^2)
Zн10 = 414.705
Zн10 := 493.833
# нумерованый список слетел)
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# номер 6
# рабочий диапозон волновода находится в пределах
# от
λmin := c/fmax
λmin = 0.0936851 m/s
# до
λmax := c/fmin
λmax = 0.14009 m/s
λmin := 0.062
λmax := 0.094
# Номер 7
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# По табличным данным на волновод моего типа
fmin = 2.14e9
fmax = 3200000000
# Номер 8
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# лк 10 последняя страница
# Тип волны
H10
H20, H01
H11, E11
H21, E21  # H30  # H02
λкр
2*a = 0.18
a = 0.09
0.9*a = 0.081
0.71*a = 0.0639
0.67*a = 0.0603
0.5*a = 0.045
# как график строить, (именно в мате каде) непонатно...
# номер 9
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# стр 16 лк 10
# номер 10
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# лк 13 стр 3
# Для волны H10
Pпред(λ1) := 597*a*b*sqrt(1 - (λ1/λкр)^2)
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# номер 11
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# ибо волновод из серебра, его удельная проводимость
σ := 3.57*10^7
δ(f1) := sqrt(2/(2*π*f1*μ0*σ))
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# номер 12
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Rs(f2) := sqrt(2*π*f2*μ0/(2*σ))
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# Номер 13
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Z0 := sqrt(μ0/ε0)
λ(f2) := 3*10^8/f2
α(f2) := (1 + (λ(f2)/(2*a))^2*(2*b/a))/(Z0*b*sqrt(1 - (λ(f2)/(2*a))^2))
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# номер 14
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L := 2
η(f2) := e^(-2*L*α(f2)*Rs(f2))
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# номер 15-17
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β := 2*π/λв
Zн := 200 + 1i*300
Pн := (Zн - Zн10)/(Zн + Zн10)
HH(ll) := (1 - Pн*exp(-1i*2*β*ll))/Zн10
E(ll) := 1 + Pн*exp(-1i*2*β*ll)
Zвх(ll) := E(ll)/HH(ll)
Rвх(ll) := Re(Zвх(ll))
Xвх(ll) := Im(Zвх(ll))
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