a := 90*10^-3
b := 45*10^-3
mmm := 1
nnn := 1
mmm1 := 1
nnn1 := 0
Ex(x, y) := cos(mmm*π*x/a)*sin(nnn*π*y/b)
hx(x, y) := cos(nnn1*π*y/a)*sin(mmm1*π*x/b)
Ey(x, y) := cos(nnn*π*y/a)*sin(mmm*π*x/b)
hy(x, y) := cos(mmm1*π*x/a)*sin(nnn1*π*y/b)
H1(x, y) := [cos(nnn1*π*y/b)*sin(mmm1*π*x/a); -cos(mmm1*π*x/a)*sin(nnn1*π*y/b)]
E(x, y) := [cos(mmm*π*x/a)*sin(nnn*π*y/b); cos(nnn*π*y/b)*sin(mmm*π*x/a)]
xn := 20
xa := a
x0 := 0
yn := 20
yb := b
y0 := 0
i := 0 .. xn - 1
j := 0 .. yn - 1
xd[i] := x0 + i*(xa - x0)/(xn - 1)
yd[j] := y0 + j*(yb - y0)/(yn - 1)
FE[i, j] := E(xd[i], yd[j])
FH1[i, j] := H1(xd[i], yd[j])
ME[i, j] := FE[i, j][0]
MH1[i, j] := FH1[i, j][0]
NE[i, j] := FE[i, j][1]
NH1[i, j] := FH1[i, j][1]
# [component: inputs (ME, NE)]
# [component: inputs (MH1, NH1)]
