a := 90*10^-3
b := 45*10^-3
mmm1 := 1
nnn1 := 1
H1(x, y) := [cos(nnn1*π*y/b)*sin(mmm1*π*x/a); -cos(mmm1*π*x/a)*sin(nnn1*π*y/b)]
xn := 20
xa := a
x0 := 0
yn := 20
yb := b
y0 := 0
i := 0 .. xn - 1
j := 0 .. yn - 1
xd[i] := x0 + i*(xa - x0)/(xn - 1)
yd[j] := y0 + j*(yb - y0)/(yn - 1)
FH1[i, j] := H1(xd[i], yd[j])
MH1[i, j] := FH1[i, j][0]
NH1[i, j] := FH1[i, j][1]
# [component: inputs (MH1, NH1)]
