# 1. В материальной среде с параметрами ε = 3,5 и σ = 0,72 См/м создано электрическое поле, имеющее частоту 600 МГц и амплитуду 15 В/м. Определить амплитудное значение и фазовый угол вектора плотности полного тока, существующего в каждой точке данной среды.
εε := 3.5
σ := 0.72
f := 600*10^6
E := 15
ω := 2*π*f
ε0 := 10^-9/(36*π)
εa := ε0*εε
Iпр := σ*E
Iсм := 1i*ω*εa*E
Iполн := Iпр + Iсм
Iполн = 10.8 + 1.75i
J := |Iполн|
J = 10.9409
φ := atan(Im(Iполн)/Re(Iполн))
φ = 0.160641
# J - амплитудное значение
# φ - ток опережает по фазе напряженность поля на угол 0.161 рад.
