# 2. Грозовая туча, имеющая площадь 5 км2, располагается на высоте 2 км от поверхности Земли. Между тучей и Землей образуется постоянное электрическое поле с одинаковой во всех точках Е=2∙10^5 В/м. Оценить энергию поля.
S := 5*10^6
h := 2000
E := 2*10^5
ε := 1
ε0 := 10^-9/(36*π)
C := ε*ε0*S/h
U := E*h
W := C*U^2/2
W = 1.76839e9
