# 3. Сердечник трансформатора выполнен из стали с плотностью 7,7
# г/см3 и имеет массу 2 кг. Амплитудное значение магнитной индукции 2,1 Тл,
# относительная магнитная проницаемость стали μ = 200. Найти максимальное
# значение энергии, запасаемой в сердечнике, при намагничивании его
# синусоидальным током.
ρ := 7.7*10^3
m := 2
B := 2.1
μ := 200
μ0 := 4*π*10^-7
Вывод
Wmax := H*BB/2  # error: Эта переменная не определена.
BB := μaH  # error: Эта переменная не определена.
Wmax := интеграл  # error: Эта переменная не определена.  # по V от Wп
Wmax/V = H^2*μμ0/2  # error: Эта переменная не определена.
# полная энергия
Wп := 1*B^2/(2*μ*μ0)
Wп = 8773.42
Wm := m*Wп/ρ
Wm = 2.27881
