# 2.1 Плоская электромагнитная волна с частотой 109 Гц
# распространяется в среде с параметрами ε = 2,25, tg δэ = 0,01, μ = 1.
# Амплитуда электрического поля в плоскости z = 0 равна 100 В/м.
# Определить среднюю плотность потока мощности в плоскости z = 1 м.
f := 10^9
ε := 2.25
tgδ := 0.01
μ := 1
Em := 100
x := 0
μ0 := 4*π*10^-7
ε0 := 10^-9/(36*π)
Reshenie
ω := 2*π*f
ω = 6.28319e9
εa := ε*ε0
εa = 1.98944e-11
μa := μ*μ0
μa = 1.25664e-6
εk := εa*(1 - 1i*tgδ)
εk = 1.98944e-11 - 1.98944e-13i
k := ω*sqrt(μa*εk)
k = 31.4163 - 0.157078i
β := Re(k)
β = 31.4163
α := Im(k)
α = -0.157078
υ := ω/β
υ = 199997500
λ := υ/f
λ = 0.199998
Zc := sqrt(μa/εk)
Zc = 251.318 + 1.25656i
E := Em*e^(α*x)*e^(-1i*β*x)
E = 100
Π := 1*|E^2/Zc|/2
Π = 19.8949
