# 2.2 Плоская электро магнитная волна падает на поверхность металла. Определить коэфициент затухания и глубину проникновения эл.маг волны в металл от частоты.
# Частота от 10^4 до 10^10. построить графики коэф затухания, глубиныпоникновения
ε := 1
μ := 1
μ0 := 4*π*10^-7
ε0 := 10^-9/(36*π)
σ := 10^4
Reshenie
ω(f) := 2*π*f
ω = ƒ(any1) → any1
εa := ε*ε0
εa = 8.84194e-12
μa := μ*μ0
μa = 1.25664e-6
εk(f) := εa*(1 - 1i*σ/(ω(f)*εa))
k(f) := ω(f)*sqrt(εk(f)*μa)
α(f) := Im(k(f))
d(f) := 1/α(f)
Zc(f) := |sqrt(μa/εk(f))|
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f := 50
E(x) := e^(-α(f)*x)
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# 3. Определить толщину медного экрана izmenyaem  σ, f
f := 50*10^6
x := ln(10^-4)/α(f)
x = 0.00655558
