# 1. Элемент эл.вибратор l=10см, излуч. ЭМВ f=300 МГц. Определить напряженность эл.магн.поля в точке наблюдения на расстоянии r=1км, в направлении макс.излучения. Амплитуда тока в вибраторе Im=1А.
Im := 1
c := 3*10^8
f := 300*10^6
l := 10*10^-2
r := 1*10^3
e0 := 10^-9/(36*3.14)
m0 := 4*3.14*10^-7
I := sqrt(-1)
Zc := sqrt(m0/e0)
La := c/f
La = 1
E := Im*l*Zc/(2*r*La)
H := Im*l/(2*r*La)
E = 0.01884
H = 5e-5
# 2. Квадратная рамка со стороной 10см, излучает такую же эл.магн.волну. Определить напряженность
a := 10^-1
S := a*a
Eb(Fi) := 1
E1(Tetta) := Im*S*3.14*Zc*sin(Tetta)/(r*La*La)
H1(Tetta) := E1(Tetta)/Zc
E1 = ƒ(Unitless) → Unitless
H1 = ƒ(Unitless) → Unitless
# 3. Характеристика направленности  элект.магн. поля в декартовых плоскостях .Построить пространственную диаграмму направленности вибратора.
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Eg(Tetta, Fi) := Im*S*3.14*Zc*sin(Tetta)*Eb(Fi)/(r*La*La)
FF(Tetta, Fi) := [cos(Fi)*sin(Tetta); sin(Tetta)*sin(Fi); cos(Tetta)]*sin(Tetta)
M := CreateMesh(FF, 0, π, 0, 2*π, 18, 36)
# Harakteristika napravlennosti
# [component: inputs M]
FF1(Tetta, Fi) := [cos(Fi)*sin(Tetta); sin(Tetta)*sin(Fi); cos(Tetta)]*|1 + cos(Tetta)|
M1 := CreateMesh(FF1, 0, π, 0, 2*π, 18, 36)
# [component: inputs M1]
