# Аквалангист находится на дне водоема глубиной 4 м, перед ним лежит камень высотой 1 метр. На каком расстояниии он увидит лужу, на пов-ти водоема, если он смотрит на поверхность водоёма, камень находится на расстоянии 2 метров.
# На каком расстоянии он увидит русалку  если она сидит на дне. Показатель преломления воды n=1.33
ε0 := 10^-9/(36*π)
ε1 := 2.2
ε2 := 1.33*1.33
f := 10*10^9
ω := 2*π*f
μa1 := 4*π*10^-7
μa2 := μa1
σ1 := 0
σ2 := 0
εa1 := ε0*ε1 - 1i*σ1/ω
εa2 := ε0*ε2 - 1i*σ2/ω
k1 := ω*sqrt(εa1*μa1)
k2 := ω*sqrt(εa2*μa2)
# Vert. pol
pε(ϕ) := (k1*εa2*cos(ϕ) - εa1*sqrt(k2^2 - (k1*sin(ϕ))^2))/(k1*εa2*cos(ϕ) + εa1*sqrt(k2^2 - (k1*sin(ϕ))^2))
# Gor. pol
pμ(ϕ) := (k1*μa2*cos(ϕ) - μa1*sqrt(k2^2 - (k1*sin(ϕ))^2))/(k1*μa2*cos(ϕ) + μa1*sqrt(k2^2 - (k1*sin(ϕ))^2))
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r := 4*tan(64)
Lr := 2*r
r = 9.39144
Lr = 18.7829
