# Плоская ЭМВ с амплитудой 10 В/м, падает на проводящую среду у которой удельная проводимость 10 уд.Определить напряженность поля, эл.магн.волны, которая проходит в диэлектрике. Волна падает вдоль нормали.
ε0 := 10^-9/(36*π)
ε1 := 1
ε2 := 1
f := 10*10^9
ω := 2*π*f
μa1 := 4*π*10^-7
μa2 := μa1
σ1 := 0
σ2 := 10
εa1 := ε0*ε1 - 1i*σ1/ω
εa2 := ε0*ε2 - 1i*σ2/ω
k1 := ω*sqrt(εa1*μa1)
k2 := ω*sqrt(εa2*μa2)
# Vert. pol
pε(ϕ) := (k1*εa2*cos(ϕ) - εa1*sqrt(k2^2 - (k1*sin(ϕ))^2))/(k1*εa2*cos(ϕ) + εa1*sqrt(k2^2 - (k1*sin(ϕ))^2))
# Gor. pol
pμ(ϕ) := (k1*μa2*cos(ϕ) - μa1*sqrt(k2^2 - (k1*sin(ϕ))^2))/(k1*μa2*cos(ϕ) + μa1*sqrt(k2^2 - (k1*sin(ϕ))^2))
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