f := 10*10^9
w := 2*π*f
B := 10
# Плоская электромагнитная волна падает на гребенчатую структуру
# Частота колебаний 10 Ггц, входн сопр zвх=jx, x=400 Ом. Определить расстояние
# от поверхности структуры, на котором волна уменьшается в 100 раз. Построить график зависимости ампл поля от высоты точки наблюдения (коорд z), определить фазовую скорость, длину волны.
ua := 4*π*10^-7
X := 400
Ea := 10^-9/(36*π)
w = 6.28319e10
β := w*sqrt(Ea*ua)
α := w*Ea*X
Zvh := 1i*X
γ := β - 1i*α
modγ := sqrt(β^2 + α^2)
α = 222.222
β = 209.44
Ex := (-1i*α*B)/(w*Ea)*e^(-α*z)*e^(-1i*γ*X)  # error: This variable is undefined.
modγ = 305.365
Emx(z) := (α*B)/(w*Ea)*e^(-α*z)
Emx(0) = 4000
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VF := w/modγ
VF = 205760014
VF/(3*10^8) = 0.685867
lamda := VF/f
lamda = 0.020576
