# Определить эффективную площадь рассеяния металлической пластины размером 10*10 см, если длина волны 3 см. Определить максимальное значение эффективной площади рассеяния
r0 := 1
λ := 0.03
k := λ/(2*π)
aa := 0.1
Ui(d) := sqrt(λ)/(2*π)*sqrt(r0)/d
bb := 0.1
λ = 0.03
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σpl := (4*π*(aa*bb)^2)/λ^2
σpl = 1.39626
σsh := π*aa^2
σsh = 0.0314159
