# Задача 1
# Для волновода мэк-100 найти предельную мощность
a := 2.3
b := 1
Pmax(λ) := 597*a*b*sqrt(1 - (λ/(2*a))^2)
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8
# Диапазон работы
f1 := 8.2*10^9
λmax := c/(8.2*10^9)
λmin := c/(12.47*10^9)
f2 := 12.47*10^9
λmax = 0.0365601 m/s
λmin = 0.0240411 m/s
σ := 6.25*10^7
w1 := 2*π*8.2*10^9
w2 := 2*π*12.47*10^9
μa := 4*π*10^-7
w1 = 5.15221e10
w2 = 7.83513e10
Rs(w) := sqrt((w*μa)/(2*σ))
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# Задача 2
# Рассчитать зависимость толщины скин слоя от линейной частоты
del(f) := 1/sqrt(π*f*μa*σ)
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# Задача 3
# Рассчитать зависимость коэффициента затухания от частоты
a1 := 2.3*10^-2
b1 := 1*10^-2
Z0 := 120*π
α(f) := (sqrt((2*π*f*μa)/(2*σ))*(1 + (c/(2*f*a1))^2*2*b1/a1))/(Z0*b1*sqrt(1 - (c/(2*f*a1))^2))
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# Задача 4
# Рассчитать зависимость коэффициента остабления от частоты для волновода круглого сечения а=2,6 см
a2 := 2.6*10^-2
λkr := 1.64*a2
α1(f) := (2*sqrt((2*π*f*μa)/(2*σ))*(c/(f*λkr))^2)/(Z0*a2*sqrt(1 - (c/(f*λkr))^2))
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# Задача 5
# Для прямоугольного волновода, длиной 4 м рассчитать зависимость КПД от частоты
a := 165*10^-3
f1 := 1.13*10^9
Z := 4
σ := 6.25*10^7
b := 82.5*10^-3
f2 := 1.72*10^9
μ := π*4*10^-7
Z0 := 120*π
λ(f) := 3*10^8/f
ω(f) := 2*3.14*f
Rs(f) := sqrt(ω(f)*μ/(2*σ))
α(f) := (1 + (λ(f)/(2*a))^2*(2*b/a))/(Z0*b*sqrt(1 - (λ(f)/(2*a))^2))
η(f) := e^(-2*Z*α(f)*Rs(f))
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