Z0 := 120*π
zzz := 4
q := 0
u := 1
rr := 2.6*10^-2
c111 := 3*10^8
σ := 6.25*10^7
f2 := 10*10^9
μ := 4*π*10^-7
E0 := 10^-9/(36*π)
λkr := 1.64*rr
b := 1*10^-2
a := 2.3*10^-2
λ111 := c111/f2
f1 := c/λkr
# Для Н10 построить зависимость
# коэффициента затухания
# от частоты
λmax := 1.6*a
λmin := 1.05*a
alpha(f) := sqrt(2*π*f*μ/(2*σ))/(Z0*rr*sqrt(1 - (c/f/λkr)^2))*((1/λkr*c/f)^2)
fmin := c111/λmax
fmax := c111/λmin
alpha1(f) := sqrt(2*π*f*E0/(2*σ))/(b*sqrt(1 - (c/f/0.046)^2))*(1 + 2*b/a*(1/0.046*c/f)^2)
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Kpd(f) := e^(-2*(sqrt(2*π*f*E0/(2*σ))/(b*sqrt(1 - (c111/f/0.046)^2))*(1 + 2*b/a*(1/0.046*c111/f)^2))*zzz)
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Zn := 500 + 1i*1
λ222 := λ111/sqrt(1 - ((c111/f2)*1/(2*a))^2)
ZcH := (120*π)/sqrt(1 - ((c111/f2)*1/(2*a))^2)
β := 2*π/λ222
ZcH = 497.304
Pn := (Zn - ZcH)/(Zn + ZcH)
Pn = 0.00270405 + 0.000999992i
modE(LLL) := |1 + Pn*e^(-2*1i*β*LLL)|
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