σ := 6.25*10^7
b := 1*10^-2
a := 2.3*10^-2
μ := 4*π*10^-7
E0 := 10^-9/(36*π)
λmax := 1.6*a
λ := c/f  # error: Эта переменная не определена.
λmin := 1.05*a
# Определить зависимость поверхностного сопротивления от частоты, если стенки волновода покрыты слоем серебра. Построить график зависимости толщины скин слоя от частоты. Коэффициент затухания от частоты.
fmin := c/λmax
fmax := c/λmin
Rs(f) := sqrt((2*π*f*μ)/(2*σ))
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delta(f) := sqrt(2/(2*π*f*μ*σ))
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alpha(f) := sqrt((2*π*f*E0)/(2*σ))/(b*sqrt(1 - (c/f/0.046)^2))*(1 + 2*b/a*(1/0.046*c/f)^2)
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