a := 2.3*10^-2
# Для прямоугольного волновода с размерами а=2,3 см в = 1 см рассчитать зависимость предельной мощности от длины волны в области существования волны основного типа Н10
q := 1
u := 0
b := 1*10^-2
λkr := 2/sqrt((q/a)^2 + (u/b)^2)
Ppred(λ) := 597*a*b*sqrt(1 - (λ/λkr)^2)
λkr = 0.046
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