c1 := 3*10^8
# Для стандартного прямоугольного волновода МЕГ100 а=2,3 см в=1см,
# работающего на частоте 10 ГГц исследовать влияние сопротивления нагрузки
# на режимы работы линии передачи. Для этого построить зависимость амплитуды
# электрического и магнитного полей от длины линии передачи и зависимость
# входного сопротивления от длины линии передачи. Определить коэффициент
# стоячей волны, бегущей волны, модуль коэффициента отражения
a := 2.3*10^-2
b := 10^-2
f := 10^10
Zn := 300 + 300*1i
λ := c1/f
mmm := 1
nnn := 0
λkr := 2/sqrt((mmm/a)^2 + (nnn/b)^2)
ZcH := 120*π/sqrt(1 - (λ/(2*a))^2)
λv := λ/sqrt(1 - (λ/λkr)^2)
Pn := (Zn - ZcH)/(Zn + ZcH)
β := 2*π/λv
modE(lll) := 1 + Pn*e^(-2*1i*β*lll)
modH(lll) := 1/ZcH*(1 - Pn*e^(-2*1i*β*lll))
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ZvH(lll) := modE(lll)/modH(lll)
Rvh(lll) := Re(ZvH(lll))
Xvh(lll) := Im(ZvH(lll))
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Kb := (1 - |Pn|)/(1 + |Pn|)
Kb = 0.406964
Kc := (1 + |Pn|)/(1 - |Pn|)
Kc = 2.45722
w1 := ZcH*Kb
P := |Pn*e^(-2*1i*β*5)|
w1 = 202.385
P = 0.421501
w2 := ZcH*Kc
w2 = 1221.99
