a := 6.1
b := -1.1
c := -2.8
d := -0.9
m := -0.78
n := 0.71
o := -1.5
p := -1.5
H := m*e^(1i*o) + n*e^(1i*p)*1
E := a*e^(1i*c) + b*e^(1i*d)*1
E := [a*e^(1i*c); b*e^(1i*d)*1]
H := [m*e^(1i*o); n*e^(1i*p)*1]
Π := E*H = -1.91735 + 4.14362i
