a := 25
b := 56
c := -69
g := 2.3
h := -0.21
j := 0.16
f := 8.9
E := a*e^(1i*g) + b*e^(1i*h)*c*e^(1i*j)
t := 7.7/f
E(t) := [a*e^(1i*g); b*e^(1i*h); c*e^(1i*j)]
t := 7.7/f
E(t) = [-16.6569 + 18.6426i; 54.7697 - 11.6738i; -68.1187 - 10.993i]
