# 1 4 17 360
# 2 6 15 127
# 3 2 20 285
# 4 7 16 230
# 5 1 6 217
# 6 7 14 246
# 7 3 3 326
# 8 1 3 178
# 9 4 20 18
# 10 8 19 256
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# Задача 2 | Исходные данные для варианта 28
M := [
    4, 17, 360;
    6, 15, 127;
    2, 20, 285;
    7, 16, 230;
    1, 6, 217;
    7, 14, 246;
    3, 3, 326;
    1, 3, 178;
    4, 20, 18;
    8, 19, 256
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]
V := 28
Дано
# Длина L,см:
L := M[V - 1, 0] = 9  # см
# Частота в ГГц:
F := M[V - 1, 1] = 1  # ГГц
# Сдвиг по фазе в градусах:
X := M[V - 1, 2] = 262  # градусов
l := L*10^-2
c := 3*10^8
x := X*π/180
f := F*10^9
μ := 1
ε := (x*c/(2*π*f*l) + 1)^2 = 11.737
n := sqrt(ε*μ) = 3.42593
