M := [
    71, 55, 746, 17;
    73, 37, 676, 86;
    84, 86, 265, 93;
    16, 22, 491, 19;
    84, 64, 333, 89;
    96, 52, 764, 29;
    43, 91, 103, 24;
    73, 24, 529, 35;
    88, 61, 864, 45;
    9, 84, 233, 91
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]
M[0, 1] = 55
# Задача 3 | Вариант :
# Дано :
V := 28
A := M[V - 1, 0] = 17
σ := M[V - 1, 1] = 64
μ := M[V - 1, 2] = 514  # 28 17 64 514 56
f := M[V - 1, 3] = 56
# 1 71 55 746 17
# 2 73 37 676 86
# 3 84 86 265 93
# 4 16 22 491 19
# 5 84 64 333 89
# 6 96 52 764 29
# 7 43 91 103 24
# 8 73 24 529 35
# 9 88 61 864 45
# 10 9 84 233 91
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α := sqrt(2*π*f*μ*σ/2) = 2405.69
L := ln(A)/α = 0.00117771
M = [
    71, 55, 746, 17;
    73, 37, 676, 86;
    84, 86, 265, 93;
    16, 22, 491, 19;
    84, 64, 333, 89;
    96, 52, 764, 29;
    43, 91, 103, 24;
    73, 24, 529, 35;
    88, 61, 864, 45;
    9, 84, 233, 91
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]
