# 1 25 85 24
# 2 50 59 25
# 3 23 9 1
# 4 36 48 6
# 5 47 76 46
# 6 28 21 21
# 7 23 33 19
# 8 10 17 40
# 9 49 80 5
# 10 3 42 7
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M := [
    25, 85, 24;
    50, 59, 25;
    23, 9, 1;
    36, 48, 6;
    47, 76, 46;
    28, 21, 21;
    23, 33, 19;
    10, 17, 40;
    49, 80, 5;
    3, 42, 7
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]
# Вариант :
# Задача 4
V := 28
μ := 1
σ := M[V - 1, 0] = 1  # См/м
f1 := M[V - 1, 1] = 10  # кГц
f2 := M[V - 1, 2] = 49  # МГц
Z1 := sqrt(1i*μ*2*π*f1*10^3/(σ*10^7)) = 0.0560499 + 0.0560499i
Z2 := sqrt(1i*μ*2*π*f2*10^6/(σ*10^7)) = 3.92349 + 3.92349i
