# Задача 2
G := 0.0016
E := 14
m := 1
l := 12
f := 26*10^6
w := 2*π*f
δ := G/(E*10^-9*w) = 0.000699582
a := w/c*sqrt(|E|*m)*sin(δ/2)
b := w/c*sqrt(|E|*m)*cos(δ/2)
λ := 2*π/b
L := e^(w/c*sqrt(|E|*m)*sin(δ/2)*2*π*c/(w*sqrt(|E|*m)*cos(δ/2)))
L := e^(a*λ) = 1.0022
L := e^(2*π*tan(δ/2)) = 1.0022
