a := -7.9
b := 3.2
c := 0.4
d := 2.3
m := -0.21
n := 0.16
o := 2.9
p := 1.6
H := m*e^(1i*o) + n*e^(1i*p)*1
E := a*e^(1i*c) + b*e^(1i*d)*1
E := [a*e^(1i*c); b*e^(1i*d)*1]
H := [m*e^(1i*o); n*e^(1i*p)*1]
Π := E*H = -0.937498 - 0.663026i
Π := |E*H|
Ответ
Π = 1.14826
