a := -7.9
b := 3.2
c := 0.4
d := 2.3
m := -0.21
n := 0.16
o := 2.9
p := 1.6
H := m*e^(1i*o) + n*e^(1i*p)*1
E := a*e^(1i*c) + b*e^(1i*d)*1
E(t) := [a*e^(1i*c); b*e^(1i*d)*1]
t := 2.6
E(t) = [-7.27638 - 3.0764i; -2.13208 + 2.38626i]
