a := 1.4
b := 7.8
c := 2.8
d := 2.9
m := -0.74
n := -0.17
o := 0.7
p := 2.8
H := m*e^(1i*o) + n*e^(1i*p)*1
E := a*e^(1i*c) + b*e^(1i*d)*1
E(t) := [a*e^(1i*c); b*e^(1i*d)*1]
t := 2.6
E(t) = [-1.31911 + 0.468983i; -7.57347 + 1.86614i]
