a := -4.7
b := -0.4
c := -1.6
d := -1.7
m := -0.93
n := 0.13
o := 1.9
p := 0.9
H := m*e^(1i*o) + n*e^(1i*p)*1
E := a*e^(1i*c) + b*e^(1i*d)*1
E := [a*e^(1i*c); b*e^(1i*d)*1]
H := [m*e^(1i*o); n*e^(1i*p)*1]
Π := E*H = -4.04869 + 1.56008i
Π := |E*H|
Ответ
Π = 4.33887
