a := 7
b := -68
c := 36
g := 0.5
h := -0.1
j := -2.3
f := 0.5
E := a*e^(1i*g) + b*e^(1i*h)*c*e^(1i*j)
t := 2.5/f
E(t) := [a*e^(1i*g); b*e^(1i*h); c*e^(1i*j)]
E(t) = [6.14308 + 3.35598i; -67.6603 + 6.78867i; -23.9859 - 26.8454i]
