2*N2222A
Pk_dop := 0.5
Uke_dop := 40
Ube_dop := 6
Ik_dop := 0.8
fT := 300*10^6
θ := 75
cos(θ) := 0.242
α0 := 0.272
α1 := 0.459
β0 := 100
Rb := 0
φt := 0.026
Koc := 1
Ikm := 0.8*Ik_dop
Ikm = 0.64
γ0 := α0*(1 - cos(θ))
γ0 = 0.206176
Ik1 := α1*Ikm
Ik1 = 0.29376
Ik0 := α0*Ikm
Ik0 = 0.17408
S := β0/(Rb + β0*φt/(α0*Ikm))
Ub1 := Ikm/S
Ub1 = 0.0955882
Uk1 := Ub1/Koc
Uk1 = 0.0955882
Roe := Uk1/Ik1
Roe = 0.325396
P1 := 0.5*Ik1*Uk1
P1 = 0.01404
P0 := Ik0*Uk0  # error: bad_variable mc_Uk0 mc_Uk0 value_zone
