Дано
fcmin := 17*10^6
fcmax := 50*10^6
fпр := 7.5*10^6
δc := 7*10^-4
δl := 6*10^-4
1.
fc := fcmax - fcmin = 33000000
fg := fc - fпр = 25500000
Δпрmax := 0.5*(δc + δl) = 0.00065
δпр := 1/2*(fc/fпр)*sqrt(δc^2 - δl^2) = 0.000793221
Константы
fT := 150*10^6
β0 := 500
τк := 100*10^-12
Cб := 6*10^-12
Ikmax := 100*10^-3
Ukmax := 30
ϕT := 0.026
θ := 75
cosθ := 0.259
α0 := 0.269
α1 := 0.455
ξгр := 0.875
ρ := 200
Q := 150
2.
Ikm := 0.2*Ikmax = 0.02
Rб := 2*τк/Cб*10^-3 = 0.0333333
S0 := β0/(Rб + β0*ϕT/(α0*Ikm)) = 0.20692
fs := fT/(S0*Rб)
fs = 2.17475e10
f := 0.2*fs = 4.3495e9
3.
Ek := 0.4*Ukmax = 12
ξ := 0.25*ξгр = 0.21875
R3_опт := 37.5/S0 = 181.229
4.
Ik1 := Ikm*α1 = 0.0091
Ik0 := Ikm*α0 = 0.00538
S1 := S0*α1*(1 - cosθ) = 0.0697642
5.
L1 := ρ/(2*π*fg) = 1.24827e-6
Lk := L1 = 1.24827e-6
Ck := 1/(4*π^2*fg^2*Lk) = 3.12069e-11
pвкл := fs/(Q*fg) = 5.68562
k := 1/(S1*pвкл^2*Q*ρ*cos(atan(fg/fs))) = 1.47805e-5
z := cos(atan(fg/fs)) = 0.999999
C1 := Ck/pвкл = 5.48873e-12
C2 := Ck/(k*pвкл) = 3.71348e-7
Cвх := 13.31*10^-12
Cвых := 11.02*10^-12
C11 := C1 - Cвых = -5.53127e-12
C12 := C2 - Cвх = 3.71335e-7
C3 := 1/(1/Ck - (1/C11 + 1/C12)) = 4.69855e-12
X2 := 1/(2*π*fg*C12) = 0.0168079
Rd := (150*X2 + 4*R3_опт)/2 = 363.719
Ib := Ik0/β0 = 1.076e-5
R1 := Ek*Rd/(Ik0*R3_опт + Ib*Rd) = 4458.58
R2 := Rd*R1/(Rd + R1) = 336.286
C4 := 1/(2*R3_опт*2*π*fg)*(20 + 20*Q) = 5.2003e-8
ff := 1/(280*10^-6) = 3571.43
