С := 600*10^-12  # Ф
γc := 15*10^-2  # %
Uр := 3  # В
Tмакс := 50  # C
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Fмакс := 10*10^6  # Гц
tgδ := 0.0010
ε := 4*10^3  # Гц
Eпр := 3
tgδ1k := 0.001
ТКС := 0.000035
ρs := 0.2  # Ом
Kз := 2/3
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C0 := 100*10^-12
dmin := Kз*Uр/Eпр = 0.666667  # мкм
Сov := 0.00885*ε/dmin = 53.1  # пФ/мм^2
γc0 := 3*10^-2
γсст := 2/3*10^-2
γct := ТКС
γsдр := γc - γc0 - γсст - γct = 0.113298
ΔL := 4*10^-4
C0точн := С*|γsдр/(2*ΔL)| = 8.49737e-8
C := 600
C0 := 100
C/C0 = 6
K := 1
S := C/C0*K = 6
Bb := sqrt(S) = 2.44949
Lb := Bb = 2.44949
g := 0.5
f := 0.5
Lh := Lb + 2*g = 3.44949
Bh := Bb + 2*g = 3.44949
Lд := Lh + 2*f = 4.44949
Bд := Bh + 2*f = 4.44949
γc0 := 3
γсст := 2/3
γct := ТКС*10^2
n := 15
Смакс := C*(1 + (γc - γc0 - γсст)/100) = 578.9
Смин := C*(1 - (γc - γc0 - γсст)/100) = 621.1
ΔC := Смин - Смакс = 42.2
C0макс := Сov*(1 + γc0/100) = 54.693
C0мин := Сov*(1 - γc0/100) = 51.507
Sосн := Смакс/C0макс = 10.5845
Bосн := sqrt(Sосн) - ΔL = 3.25299
Lосн := Bосн
Smin := Смин/C0мин = 12.0586
Sc := 0.003
t := Lосн/n = 0.216866
bсп := 0.015
lсп := t - bсп = 0.201866
hсп := Sc/(bсп - ΔL) = 0.205479
Lb := Lосн
Bb := Bосн + hсп = 3.45847
