# Тантал
#
# ТВЧ; лента
#
# толщиной
#
# 0,3 - 3 мм
#
# (РЭТУ
#
# 1244 - 67)
R0 := 12
l := 1
b := 5
n := l/b
R := R0*n
P0 := 3
S := 45
P := P0*S
γr := 15*10^-2
γps := 5*10^-2
γRct := 3*10^-2
γRk := 3*10^-2
Tmax := 50
C := Tmax - 20
αt := |-3*10^-4*(1/C)| = 1e-5
γRt := αt
γдоп := γr - γps - γRct - γRk - γRt = 0.03999
4 %
ρs := 250
t := 60
Rр := 2*10^3
Pр := 10*10^-3
PC := 3710
Kф := Rр/ρs = 8
Δb := 1
Δl := 2
bточн := (Δb + Δl/Kф)/γдоп = 31.2578
bp := sqrt(Pр/(P0*Kф)) = 0.0204124
β := 0.015
lрас := β*Kф = 0.12
# Расчёт плёночных контактов
γrk := 0.5
ρk := 0.000005
Rkmin := sqrt(ρk*ρs)/β = 2.35702
Rkdop := γrk*R/2 = 0.6
